Simulations: Version=188
  Folder Replacements
    Report: EventNames=[Clock].DoReport
      VariableNames:
        [Clock].Today
        [Clock].Today.Year
        [Clock].Today.DayOfYear
        [Weather].DaysSinceWinterSolstice   as DAWS
        [PlantVariables].Script.Height 		as height
        [PlantVariables].Script.LAI         as LAIStrip
        [PlantVariables].Script.FRadInt     as f.rad.int
        [PlantVariables].Script.ET          as transpiration
        [PlantVariables].Script.ES          as Es
        [PlantVariables].Script.PET         as PET
        [PlantVariables].Script.RootDepth   as rootDepth
        [Soil].OutputLayers.SW
        sum([Soil].OutputLayers.SWmm)       as psw
        [Weather].Rain
        [Irrigation].IrrigationApplied as waterApplied
        [Soil].SoilWater.Drainage
        [Pear].Phenology.CurrentSeason as CurrentSeason
        [Pear].Phenology.Stage
        [Pear].Phenology.AccumulatedEmergedTT
        [Pear].Phenology.BudBurstDOY      as BudBurstDAWS
        [Pear].Phenology.FloweringDOY     as FloweringDAWS
        [Pear].Phenology.VeraisonDOY      as VeraisonDAWS
        [Pear].Phenology.CurrentStageName as CurrentStageName
        [Pear].Phenology.AccumulatedChillingUnitBeforeWinterPruning
        [Pear].Structure.PrimaryBudNo
        [Pear].Structure.MainStemPopn
        [Pear].Structure.LeafTipsAppeared
        [Pear].Structure.TotalLeavesPerShoot as leaf.no.shoot
        [Pear].Leaf.InitialisedCohortNo
        [Pear].Leaf.DeadCohortNo
        [Pear].Leaf.AppearedCohortNo as leaf.no.shoot.main
        [Pear].Leaf.CohortSize
        [Pear].Leaf.Live.NConc
        [Pear].Leaf.Transpiration
        [Pear].Population
        [Pear].Leaf.LAI/([Pear].Population + 0.0000001)          as leaf.area.vine
        [Pear].Leaf.LAI/([Pear].Structure.MainStemPopn + 0.0000001) as leaf.area.shoot
        [Pear].Leaf.LAIMainStem/([Pear].Structure.MainStemPopn + 0.0000001) as leaf.area.shoot.main
        [Pear].Leaf.LAIBranch/([Pear].Structure.MainStemPopn + 0.0000001) as leaf.area.shoot.lateral
        [Pear].Leaf.Fn
        [Pear].Leaf.Fw
        [Pear].Leaf.Live.Wt
        [Pear].Leaf.Live.Wt/([Pear].Population + 0.0000001) as leaf.dw.vine
        [Pear].Leaf.Live.Wt/([Pear].Structure.MainStemPopn + 0.0000001)  as leaf.dw.shoot
        [Pear].Shoot.Live.Wt
        [Pear].Shoot.Live.Wt/([Pear].Structure.MainStemPopn + 0.0000001) as shoot.dw.mean
        [Pear].Shoot.Live.StructuralWt
        [Pear].Shoot.Live.StorageWt
        [Pear].Cane.Live.Wt
        [Pear].Cane.Live.StructuralWt
        [Pear].Cane.Live.StorageWt
        [Pear].Trunk.Live.Wt
        [Pear].Trunk.Live.StructuralWt
        [Pear].Trunk.Live.StorageWt
        [Pear].Trunk.Live.StorageWt/([Pear].Trunk.Live.Wt + 0.0000001) as total.NSC.concentration.trunk
        [Pear].Root.Live.Wt
        [Pear].StructuralRoot.Live.Wt
        [Pear].StructuralRoot.Live.StructuralWt
        [Pear].StructuralRoot.Live.StorageWt
        [Pear].StructuralRoot.Live.StorageWt/([Pear].StructuralRoot.Live.Wt + 0.0000001) as total.NSC.concentration.root
        [Pear].Root.NTakenUp
        [Pear].StructuralRoot.N
        [Pear].Arbitrator.FDM
        [Pear].Arbitrator.DM.TotalFixationSupply
        [Pear].Berry.Live.Wt
        [Pear].Berry.Live.Wt/([Pear].Population + 0.0000001) as TotalBerryDW
        [Pear].Berry.SingleBerryDW
        [Pear].Berry.SingleBerryFW     as berry.fw.mean
        [Pear].Berry.TotalBerryFW/([Pear].Population + 0.0000001) as yield_per_tree
        [Pear].Berry.NumberFunction
        [Pear].Berry.ThermalTimeAfterFlowering
        [Pear].Berry.WaterContent
        [Pear].Berry.N
        [Pear].Berry.NFillingRate
        [Pear].Berry.Brix 				as brix
        [Pear].Berry.TitratableAcid 	as ta
        [Pear].Berry.MetFactors.BUN_TmaxIni_Record    as BUN_TmaxIni
        [Pear].Berry.MetFactors.BUN_RadIni_Record     as BUN_RadIni
        [Pear].Berry.MetFactors.BEN_RainTotFlow as BEN_RainTotFlow
        [Pear].Berry.MetFactors.BEN_TmaxIni_Record    as BEN_TmaxIni_Record
        [Pear].Berry.MetFactors.BEN_TmaxFlow   as BEN_TmaxFlow
        [Pear].Berry.MetFactors.BEN_TminFlow   as BEN_TminFlow
        [Pear].Berry.MetFactors.BM_RadFlow      as BM_RadFlow
        [Pear].Berry.MetFactors.BM_RainTotFlow  as BM_RainTotFlow
        [Pear].Berry.MetFactors.BM_RainTotVer   as BM_RainTotVer
        [Pear].Berry.MetFactors.BM_TmaxFlow    as BM_TmaxFlow
        [Pear].Berry.YieldComponent.BunchesPerShoot as bunch.no.shoot
        [Pear].Berry.YieldComponent.BunchesPerVine  as bunch.no.vine
        [Pear].Berry.YieldComponent.BerryNum    as BerryNum
        [Pear].Berry.YieldComponent.BerryMass   as berry.fw.est
        [Pear].Berry.YieldPerVine               as yield.per.vine
        // Note: for converting into field scale, need the strip area, this could be done by multiplying all by Ai/At = Ai/(A1+A2)
        [Row].Area
        [Alley].Area
        [Row].Area/([Alley].Area+[Row].Area + 0.0000001) as Row.FractionArea
        [Alley].Area/([Alley].Area+[Row].Area + 0.0000001) as Alley.FractionArea
        [Weather].Radn as TotalRadiation
        [Row].Pear.Leaf.RadiationIntercepted
        [Alley].Slurp.Leaf.RadiationIntercepted
        // Carbon balance (basic)
        [Row].Pear.AboveGround.Wt
        [Row].Pear.BelowGround.Wt
        ([Row].Pear.Leaf.Removed.Wt+[Row].Pear.Shoot.Removed.Wt+[Row].Pear.Cane.Removed.Wt+[Row].Pear.Trunk.Removed.Wt+[Row].Pear.Berry.Removed.Wt+[Row].Pear.StructuralRoot.Removed.Wt+[Row].Pear.Root.Removed.Wt) as Row.Pear.Removed.Wt
        ([Row].Pear.Leaf.Detached.Wt+[Row].Pear.Shoot.Detached.Wt+[Row].Pear.Cane.Detached.Wt+[Row].Pear.Trunk.Detached.Wt+[Row].Pear.Berry.Detached.Wt+[Row].Pear.StructuralRoot.Detached.Wt+[Row].Pear.Root.Detached.Wt) as Row.Pear.Detached.Wt
        [Row].SurfaceOrganicMatter.C as Row.SurfaceOM.C
        sum([Row].Soil.Nutrient.FOM.C) as Row.SoilFOM.C
        sum([Row].Soil.Nutrient.Microbial.C)+sum([Row].Soil.Nutrient.Humic.C) as Row.SoilOM.C
        // Water balance (basic)
        [Weather].Rain as Rainfall
        [Row].Irrigation.IrrigationApplied as Row.Irrigation
        [Row].Soil.SoilWater.Runoff as Row.Runoff
        [Row].Soil.SoilWater.Es as Row.Evaporation
        [Row].Pear.Leaf.Transpiration as Row.Transpiration
        [Row].Soil.SoilWater.Drainage as Row.Drainage
        sum([Row].Soil.SoilWater.SWmm) as Row.TotalSWC
        [Alley].Irrigation.IrrigationApplied as Alley.Irrigation
        [Alley].Soil.SoilWater.Runoff as Alley.Runoff
        [Alley].Soil.SoilWater.Es as Alley.Evaporation
        [Alley].Slurp.Leaf.Transpiration as Alley.Transpiration
        [Alley].Soil.SoilWater.Drainage as Alley.Drainage
        sum([Alley].Soil.SoilWater.SWmm) as Alley.TotalSWC
        sum([Row].Soil.Physical.SATmm) as TotalSAT
        sum([Row].Soil.Physical.DULmm) as TotalDUL
        sum([Row].Soil.Physical.LL15mm) as TotalLL15
        // Nitrogen balance (basic)
        [Row].SurfaceOrganicMatter.N as Row.SurfaceOM.N
        sum([Row].Soil.Nutrient.FOM.N) as Row.SoilFOM.N
        sum([Row].Soil.Nutrient.Microbial.N)+sum([Row].Soil.Nutrient.Humic.C) as Row.SoilOM.N
        [Row].Fertiliser.NitrogenApplied as Row.FertiliserN
        sum([Row].Soil.SoilWater.LeachUrea)+sum([Row].Soil.SoilWater.LeachNO3) as Row.LeachedN
        sum([Row].Soil.Nutrient.DenitrifiedN) as Row.DenitrifiedN
        [Row].Pear.Root.NTakenUp*10.0 as Row.UptakeN
        sum([Row].Soil.Nutrient.MineralN) as Row.Mineral_N
        sum([Alley].Soil.Nutrient.MineralN) as Alley.Mineral_N
        [Alley].SurfaceOrganicMatter.N as Alley.SurfaceOM.N
        sum([Alley].Soil.Nutrient.FOM.N) as Alley.SoilFOM.N
        sum([Alley].Soil.Nutrient.Microbial.N)+sum([Alley].Soil.Nutrient.Humic.C) as Alley.SoilOM.N
        [Alley].Fertiliser.NitrogenApplied as Alley.FertiliserN
        sum([Alley].Soil.SoilWater.LeachUrea)+sum([Alley].Soil.SoilWater.LeachNO3) as Alley.LeachedN
        sum([Alley].Soil.Nutrient.DenitrifiedN) as Alley.DenitrifiedN
        [Alley].Slurp.Root.NTakenUp*10.0 as Alley.UptakeN
        sum([Alley].Slurp.Arbitrator.N.Fixation)*10.0 as Alley.FixedN
    Report ReportAlley: EventNames=[Clock].DoReport
      VariableNames:
        [Clock].Today
        [Clock].Today.Year
        [Clock].Today.DayOfYear
        [Weather].DaysSinceWinterSolstice   as DAWS
        [PlantVariables].Script.Height 		as height
        [PlantVariables].Script.LAI         as LAIStrip
        [PlantVariables].Script.FRadInt     as f.rad.int
        [PlantVariables].Script.ET          as transpiration
        [PlantVariables].Script.ES          as Es
        [PlantVariables].Script.PET         as PET
        [PlantVariables].Script.RootDepth   as rootDepth
        [Soil].OutputLayers.SW
        sum([Soil].OutputLayers.SWmm)       as psw
        [Weather].Rain
        [Irrigation].IrrigationApplied   as waterApplied
        [Soil].SoilWater.Drainage
        [Alley].Slurp.Leaf.Live.N
        [Alley].Slurp.Root.NUptake
        [Alley].Slurp.Root.NTakenUp
    Manager PlantVariables
```csharp
using Models.Climate;
using System;
using Models.Core;
using Models.PMF;
using System.Collections.Generic;
using Models.Soils;
using APSIM.Shared.Utilities;
using Models.Zones;
using Models.PMF.Organs;

namespace Models
{
    [Serializable]
    public class Script : Model
    {
        [Link] private Weather weather;
        private RectangularZone AlleyZone {get; set; }
        private RectangularZone RowZone {get; set;}
        private RectangularZone ThisZone {get; set;}
        private double AreaWidth {get; set;}

        public double FRadInt {get; set;}
        public double ET {get; set;}
        public double ES {get; set;}
        public double PET {get; set;}
        public double LAI {get; set;}
        public double Height {get; set;}
        public double RootDepth {get; set;}
        public double PlantWidth {get; set;}

        [EventSubscribe("StartOfSimulation")]
        private void DoStartOfSimulation(object sender, EventArgs e)
        {
               
               ThisZone = this.Parent.Parent as RectangularZone;
               RowZone = this.Parent.Parent.Parent.FindInScope("Row") as RectangularZone;
               AlleyZone = (RectangularZone)this.Parent.Parent.Parent.FindInScope("Alley") as RectangularZone;
               AreaWidth = AlleyZone.Width + RowZone.Width;
               PlantWidth = 0;
        }
        
        [EventSubscribe("DoReportCalculations")]
        private void OnDoReportCalculations(object sender, EventArgs e)
        {
            if (ThisZone.Name == "Row")
                {
                FRadInt = ((double)RowZone.Get("Pear.Leaf.RadiationIntercepted") * RowZone.Width)/(weather.Radn * AreaWidth);
                ET = (double)RowZone.Get("Pear.Leaf.Transpiration") * RowZone.Width/AreaWidth;
                LAI = (double)RowZone.Get("Pear.Leaf.LAI");
                //LAIPerVine =  LAI*RowZone.Width*1.8;
                //TreeInitialisation.Script.VineDistance;
                //(double)RowZone.Get("Pear.Leaf.LAI");
                Height = (double)RowZone.Get("Pear.Leaf.Height");
                RootDepth = (double)RowZone.Get("Pear.Root.Depth");
                PlantWidth = (double)RowZone.Get("Pear.Leaf.Width");
                }
            else
                {
                FRadInt = ((double)AlleyZone.Get("Slurp.Leaf.RadiationIntercepted") * ThisZone.Width)/ (weather.Radn * AreaWidth);
                ET = (double)AlleyZone.Get("Slurp.Leaf.Transpiration") * ThisZone.Width/AreaWidth;
                LAI = (double)AlleyZone.Get("Slurp.Leaf.LAI");
                Height = (double)AlleyZone.Get("Slurp.Leaf.Height");
                RootDepth = (double)AlleyZone.Get("Slurp.Root.Depth");
                }

            ES = (double)ThisZone.Get("Soil.SoilWater.Es") * ThisZone.Width/AreaWidth;
            double PETWidth = Math.Min(Math.Max(PlantWidth,ThisZone.Width),AreaWidth);
            PET = (double)ThisZone.Get("Soil.SoilWater.Eo") * PETWidth/AreaWidth;
        }
    }
}
```
    Manager AutoIrrigationBasedOnWaterDeficit (disabled)
      StartDate = 1-nov
      EndDate = 1-mar
      FASWThreshold = 0.8
      FASWDepth = 2000
      Amount = 20
```csharp
using Models.Interfaces;
using System;
using Models.Core;
using System.Collections.Generic;
using System.Text;
using Models.Soils;
using Models.PMF;
using Models;
using System.Xml.Serialization;
using APSIM.Shared.Utilities;

namespace Models
{
    [Serializable] 
    public class Script : Model
    {
        [Link] private Zone zone;
        [Link] private Irrigation irrigation;
        [Link] private Soil soil;
        [Link] private Clock clock;
        [Link]
        private IPhysical soilPhysical;
        [Link]
        private ISoilWater waterBalance;
        public double FASW { get; set; }
        public double WaterDeficit  { get; set; } 
        
        [Description("Irrigation start window (d-mmm)")]
        public string StartDate { get; set; }
        [Description("Irrigation end window (d-mmm)")]
        public string EndDate { get; set; }

        [Description("Threshold fraction available water (0-1)")]
        public double FASWThreshold { get; set; }

        [Description("Soil depth (mm) to which fraction available water is calculated")]
        public double FASWDepth { get; set; }

        [Description("Amount of water (mm) applied each irrigation")]
        public double Amount { get; set; }

        [EventSubscribe("DoManagement")]
        private void OnDoManagement(object sender, EventArgs e)
        {
            CalculateFASW();
            if (DateUtilities.WithinDates(StartDate, clock.Today, EndDate))
            {
                if (FASW < FASWThreshold)
                {
                    irrigation.Apply(Amount, depth: 0);
                }
            }
        }
        
        private void CalculateFASW()
        {
            double[] LL15 = MathUtilities.Multiply(soilPhysical.LL15, soilPhysical.Thickness);
            double[] DUL = MathUtilities.Multiply(soilPhysical.DUL, soilPhysical.Thickness);
        
            int nlayr = GetLayerIndex();
            double cumdep = MathUtilities.Sum(soilPhysical.Thickness, 0, nlayr, 0.0);

            double excess_fr = MathUtilities.Divide((cumdep - FASWDepth), soilPhysical.Thickness[nlayr], 0.0);

            // note that results may be strange if swdep < ll15
            double avail_sw = (MathUtilities.Sum(waterBalance.SWmm, 0, nlayr, 0.0)
                              - excess_fr * waterBalance.SWmm[nlayr])
                              - (MathUtilities.Sum(LL15, 0, nlayr, 0.0)
                              - excess_fr * LL15[nlayr]);


            double pot_avail_sw = (MathUtilities.Sum(DUL, 0, nlayr, 0.0)
                                  - excess_fr * DUL[nlayr])
                                  - (MathUtilities.Sum(LL15, 0, nlayr, 0.0)
                                  - excess_fr * LL15[nlayr]);

            FASW = MathUtilities.Divide(avail_sw, pot_avail_sw, 0.0);
            WaterDeficit = MathUtilities.Constrain(pot_avail_sw - avail_sw, 0.0, 100000);
        }

        private int GetLayerIndex()
        {
            double[] cumThickness = soilPhysical.ThicknessCumulative;
            for (int i = 1; i < cumThickness.Length; i++)
            {
                if (FASWDepth < cumThickness[i])
                    return i - 1;
            }
            
            return cumThickness.Length - 1;
        }

    }
}
```
    Manager Fertilise on fixed dates
      FertiliserType = NH4NO3N
      FertiliserDates = 10-Nov, 10-Jan
      Amount = 30
      AmountType = True
```csharp
using Models.Soils;
using System;
using Models.Core;
using Models.PMF;
using APSIM.Shared.Utilities;
namespace Models
{
    [Serializable]
    public class Script : Model
    {
        [Link] Clock Clock;
        [Link] Fertiliser Fertiliser;
        
        [Separator("A component to apply fertiliser on one or more dates on every year of the simulation")]

        [Description("Type of fertiliser to apply? ")] 
        [Display(Type = DisplayType.FertiliserType)]public string FertiliserType { get; set; }

        [Description("Enter the fertilisation dates as dd-mmm with comma separation (any year information entered will be ignored): ")] 
        public string[] FertiliserDates { get; set; } 

        [Description("Amount of fertiliser to be applied (kg /ha)")] 
        public double Amount { get; set; }

        [Description("Is the above amount to be applied each time? (yes/ticked)? Or is it the total annual amount across all dates (no/unticked)")] 
        public bool AmountType { get; set; }
        
        [EventSubscribe("DoManagement")]
        private void OnDoManagement(object sender, EventArgs e)
        {
            foreach (string ddMMM in FertiliserDates)
            {
                if (DateUtilities.DatesEqual(ddMMM, Clock.Today))
                {
                    if (AmountType)
                        Fertiliser.Apply(amount: Amount, type: FertiliserType);
                    else
                        Fertiliser.Apply(amount: Amount / FertiliserDates.Length, type: FertiliserType);
                }
            }
        }
    }
}
```
    SurfaceOrganicMatter: InitialResidueName=wheat_stubble; InitialResidueType=wheat; InitialResidueMass=0; InitialStandingFraction=0; InitialCPR=0; InitialCNR=7.44
    Manager Reset on date
      ResetDate = 10-Jul
      ResetWater = Yes
      ResetNutrients = Yes
      ResetSOM = Yes
```csharp
using APSIM.Shared.Utilities;
using Models.Surface;
using Models.Utilities;
using Models.Soils.Nutrients;
using Models.Soils;
using Models.PMF;
using Models.Core;
using System;
using Models.Interfaces;

namespace Models
{
    [Serializable]
    public class Script : Model
    {
        [Link] private Clock Clock;
        [Link] private Plant Wheat;
        [Link] private ISoilWater SoilWater;
        [Link] private Nutrient nitrogen;
        [Link] private SurfaceOrganicMatter SOM;
        [Link] private Summary Summary;

        [Description("Date to reset on:")]
        public string ResetDate {get;set;}

        [Description("Reset Water? (Yes or No)")]
        public string ResetWater {get;set;}

        [Description("Reset Soil Nutrients ? (Yes or No)")]
        public string ResetNutrients {get;set;}

        [Description("Reset Surface Organic Matter? (Yes or No)")]
        public string ResetSOM {get;set;}

        [EventSubscribe("DoManagement")]
        private void OnDoManagement(object sender, EventArgs e)
        {
            if (DateUtilities.WithinDates(ResetDate, Clock.Today, ResetDate))
            {
                if (ResetWater == "Yes")
                {
                    Summary.WriteMessage(this, "Reset Water", MessageType.Diagnostic);
                    SoilWater.Reset();
                }
               
                 if (ResetNutrients == "Yes")
                {
                    Summary.WriteMessage(this, "Reset Nitrogen", MessageType.Diagnostic);
                    nitrogen.Reset();
                }

                if (ResetSOM == "Yes")
                {
                    Summary.WriteMessage(this, "Reset Surface OM", MessageType.Diagnostic);
                    SOM.Reset();
                }
            }
        }
    }
}
```
    Manager Fertilise topup
      FertiliserType = NH4NO3N
      Threshold = 50
```csharp
using Models.Soils;
using Models.Soils.Nutrients;
using System;
using Models.Core;
using Models.PMF;
using Models.Soils.Nutrients;
using APSIM.Shared.Utilities;
namespace Models
{
    [Serializable]
    public class Script : Model
    {
        [Link] private Clock Clock;
        [Link] private Fertiliser Fertiliser;
        [Link(Path="[NO3]")] private Solute SoilNitrogenNO3;
        [Link]
        private Nutrient Nutrient;
        [Link(Path="[SurfaceOrganicMatter].SurfaceResidue.Decomposition")]
        private OrganicFlow ResidueDecomposition;

        [Description("Type of fertiliser to apply? ")] 
        [Display(Type = DisplayType.FertiliserType)]public string FertiliserType { get; set; }
    
        [Description("Threshold amount of NO3 to topup to (kg/ha)")]
        public double Threshold { get; set;}
        
        [EventSubscribe("DoManagement")]
        private void OnDoManagement(object sender, EventArgs e)
        {
            double Amount = Threshold - MathUtilities.Sum(SoilNitrogenNO3.kgha);
            Fertiliser.Apply(amount: Amount, type: FertiliserType);
        }
    }
}
```
  DataStore
  Simulation Vineyard
    Weather: FileName=Heraklion.csv; Latitude=0; Tav=0; Amp=0
      ConstantsFile=/home/eathanasakis/Intership/MultiAgent_Apsimx/APSIM_FILES/Heraklion.ini
    Clock: Start=2025-03-04; End=2025-03-20
    Summary
    SoilArbitrator Soil Arbitrator
    MicroClimate: a_interception=0; b_interception=1; c_interception=0; d_interception=0; SoilHeatFluxFraction=0.4; MinimumHeightDiffForNewLayer=0; NightInterceptionFraction=0.5; ReferenceHeight=2
    RectangularZone Row: Length=100; Width=0.9; Slope=0; AspectAngle=10; Altitude=105
      Memo
        Double Guyôt-trained vines, pruned each year to retain 24 nodes were monitored. Vines were trained using vertical shoot positioning (VSP), with an exposed leaf area height of 1.2 m, and trimmed to maintain a compact canopy. Vines were planted 1.8 m apart within the row, and 2.4 m apart between rows. Average flowering date was determined by monitoring all the inflorescences on one cane on a vine in each plot on a regular basis throughout flowering. Likewise, regular berry samples (at least weekly) were taken from before the date of véraison until harvest at a soluble solids concentration value of 21.5 oBrix.
      Plant Pear: PlantType=Grapevine
        Folder Varieties
          Cultivar my_type
          Cultivar Williams
            Command:
              [Phenology].Dormancy.Target.BaseTarget.FixedValue = 60
              [Phenology].Budbreak.Target.FixedValue = 15
              [Phenology].Flowering.Target.FixedValue = 10
              [Phenology].FruitSet.Target.FixedValue = 10
              [Phenology].FruitGrowth.Target.FixedValue = 90
              [Phenology].Harvest.Target.FixedValue = 20
          Cultivar Sissy
            Command:
              [Phenology].Dormancy.Target.BaseTarget.FixedValue = 45
              [Phenology].Budbreak.Target.FixedValue = 20
              [Phenology].Flowering.Target.FixedValue = 12
              [Phenology].FruitSet.Target.FixedValue = 10
              [Phenology].FruitGrowth.Target.FixedValue = 100
              [Phenology].Harvest.Target.FixedValue = 20
        Phenology
          SubDailyInterpolation ThermalTime: agregationMethod=0
            WangEngelTempFunction Response: MinTemp=5; OptTemp=25; MaxTemp=35; RefTemp=25; MaximumTemperatureWeighting=0.5; Units=oC
            HourlySinPpAdjusted InterpolationMethod
          GenericPhase Dormancy: Start=Endodormancy; End=Ecodormancy; IsEmerged=false
            SubtractFunction Target
              Constant BaseTarget: FixedValue=52.6; Units=chilling days
              VariableReference AccumulatedChillingUnitBeforeWinterPruning: VariableName=[Phenology].AccumulatedChillingUnitBeforeWinterPruning
            SubDailyInterpolation Progression: agregationMethod=0
              HourlySinPpAdjusted InterpolationMethod
              SigmoidFunction Response
                Constant Ymax: FixedValue=1; Units=constant
                Constant Xo: FixedValue=12.42; Units=oC
                Constant b: FixedValue=-3.865; Units=unitless
          GenericPhase Budbreak: Start=Ecodormancy; End=BudBurst; IsEmerged=false
            Constant Target: FixedValue=1011; Units=GDD oC D
            SubDailyInterpolation Progression: agregationMethod=0
              XYPairs Response: X=[0, 4, 12, 25, 35, 40]; Y=[0, 0, 1, 1, 0, 0]
              HourlySinPpAdjusted InterpolationMethod
          GenericPhase Flowering: Start=BudBurst; End=FloweringTime; IsEmerged=true
            Constant Target: FixedValue=21.1; Units=development day
            VariableReference Progression: VariableName=[Phenology].ThermalTime
          GenericPhase FruitSet: Start=FloweringTime; End=FruitSet; IsEmerged=true
            Constant Target: FixedValue=10; Units=development day
            VariableReference Progression: VariableName=[Phenology].ThermalTime
          GenericPhase FruitGrowth: Start=FruitSet; End=FruitMaturation; IsEmerged=true
            Constant Target: FixedValue=23; Units=development day
            VariableReference Progression: VariableName=[Phenology].ThermalTime
          GenericPhase Harvest: Start=FruitMaturation; End=Harvest; IsEmerged=true
            Constant Target: FixedValue=23; Units=development day
            VariableReference Progression: VariableName=[Phenology].ThermalTime
          AccumulateFunction AccumulatedChillingUnitBeforeWinterPruning: StartStageName=Endodormancy; EndStageName=BudBurst; ResetStageName=BudBurst; FractionRemovedOnCut=0; FractionRemovedOnHarvest=0; FractionRemovedOnGraze=0; FractionRemovedOnPrune=0
            LessThanFunction ChillBeforePrune
              VariableReference DAWS: VariableName=[Weather].DaysSinceWinterSolstice
              Constant PruningTime: FixedValue=341
              LessThanFunction ChillBeforeAutumn
                Constant autumn: FixedValue=200; Units=make sure the photoperiod is decreasing
                VariableReference DAWS: VariableName=[Weather].DaysSinceWinterSolstice
                LessThanFunction ChillBelowCriticalPhotoperiod
                  PhotoperiodFunction: Twilight=0; DayLength=0
                  Constant CriticalPhotoPeriod: FixedValue=13.14
                  VariableReference ChillingUnit: VariableName=[Phenology].Dormancy.Progression
                  Constant Zero: FixedValue=0
                Constant Zero: FixedValue=0
              Constant Zero: FixedValue=0
          OnEventFunction BudBurstDOY: SetEvent=BudBurst; ReSetEvent=Endodormancy
            Constant PreEventValue: FixedValue=0
            VariableReference PostEventValue: VariableName=[Weather].DaysSinceWinterSolstice
          OnEventFunction FloweringDOY: SetEvent=FloweringTime
            Constant PreEventValue: FixedValue=176
            VariableReference PostEventValue: VariableName=[Weather].DaysSinceWinterSolstice
          OnEventFunction VeraisonDOY: SetEvent=FruitMaturation; ReSetEvent=Ecodormancy
            Constant PreEventValue: FixedValue=0
            VariableReference PostEventValue: VariableName=[Weather].DaysSinceWinterSolstice
          OnEventFunction CurrentSeason: SetEvent=BudBurst; ReSetEvent=Endodormancy
            Constant PreEventValue: FixedValue=0
            VariableReference PostEventValue: VariableName=[Clock].Today.Year
          LeafDeathPhase CanopySenescence: Start=Harvest; End=LeafFall; IsEmerged=true
            VariableReference ThermalTime: VariableName=[Phenology].ThermalTime
          GotoPhase DormancyRewind: Start=LeafFall; IsEmerged=false; PhaseNameToGoto=Dormancy; RemovalType=0
          Age
          OnEventFunction FirstGrowthSeason: SetEvent=BudBurst
            Constant PreEventValue: FixedValue=0
            Constant PostEventValue: FixedValue=1
        Structure: CohortInitialisationStage=Ecodormancy; LeafInitialisationStage=BudBurst
          VariableReference ThermalTime: VariableName=[Phenology].ThermalTime
          PhaseLookupValue MainStemPrimordiaInitialitationRate: Start=BudBurst; End=FloweringTime
            Constant MainStemPrimordiaInitiationRate: FixedValue=0.8; Units=development day
          PhaseLookupValue Phyllochron: Start=BudBurst; End=LeafFall
            MultiplyFunction Phyllochron
              Constant Phyllochron: FixedValue=25; Units=Main-stem leaves
              LinearInterpolationFunction LeafStageFactor
                XYPairs: X=[1, 5, 10, 24]; Y=[0.9, 0.9, 1, 1]
                VariableReference XValue: VariableName=[Leaf].AppearedCohortNo
          Constant FinalLeafNumber: FixedValue=25; Units=Main-stem leaves
          Constant BranchMortality: FixedValue=0; Units=%
          Constant DroughtInducedBranchMortality: FixedValue=0; Units=%
          Constant StemSenescenceAge: FixedValue=0
          Constant BudsPerMeterRow: FixedValue=25; Units=buds per meter
          BudNumberFunction BudNumber: SetStage=BudBurst
            MultiplyFunction FractionOfBudBurst
              SigmoidFunction BudNumberEffect
                VariableReference XValue: VariableName=[Structure].PrimaryBudNo
                Constant Ymax: FixedValue=1.4; Units=unitless
                Constant Xo: FixedValue=100; Units=buds
                Constant b: FixedValue=-54.8977; Units=unitless
              LinearInterpolationFunction CaneDiameterEffect
                XYPairs: X=[0, 12, 15]; Y=[0.1, 1, 1]
                VariableReference XValue: VariableName=[Pear].Cane.CaneDiameter
          AddFunction HeightModel
            Constant BaseHeight: FixedValue=1100; Units=mm
            MinimumFunction ShootHeight
              MultiplyFunction ShootLength
                LinearInterpolationFunction SeasonalPattern
                  XYPairs: X=[0, 100, 150, 177, 335, 336, 366]; Y=[0, 0, 1300, 1700, 1700, 0, 0]
                  VariableReference XValue: VariableName=[Weather].DaysSinceWinterSolstice
                LinearInterpolationFunction DensityEffect
                  XYPairs: X=[0, 13.3, 20, 26.7, 33.3, 40, 60, 65]; Y=[1, 1, 0.92, 0.86, 0.8, 0.77, 0.65, 0.65]
                  VariableReference XValue: VariableName=[Structure].BudsPerMeterRow.FixedValue
              Constant TrimShootHeight: FixedValue=1100; Units=mm
          MultiplyFunction BranchingRate
            LinearInterpolationFunction Potential_Branching_Rate
              XYPairs: X=[0, 7, 8, 13, 14, 34]; Y=[0.05, 0.07, 0.07, 0.07, 0.07, 0.05]
              VariableReference XValue: VariableName=[Structure].LeafTipsAppeared
            LinearInterpolationFunction LeafAreaEffect
              XYPairs: X=[0, 7, 8, 13, 14, -]; Y=[1, 0.25, 0.04, 0.01, 0, -]
              VariableReference XValue: VariableName=[Leaf].LAI
            LinearInterpolationFunction NodeNumberPerMeter
              XYPairs: X=[0, 13.3, 20, 26.7, 33.3, 40, 60, 65, 66]; Y=[2.1, 2.1, 1.5, 0.85, 0.45, 0.2, 0.1, 0, 0]
              VariableReference XValue: VariableName=[Structure].BudsPerMeterRow.FixedValue
        Leaf: Albedo=0.25; Gsmax350=0.02; R50=200; KDead=0.03; MaximumMainStemLeafNumber=30
          zero: CurrentExpandingLeaf, StartFractionExpanded, FractionNextleafExpanded, DeadNodesYesterday, MaxCover, GrowthRespiration, LAI, Depth, Width, PotentialEP, WaterDemand, TipsAtEmergence, CohortsAtInitialisation, FractionDied
          VariableReference ThermalTime: VariableName=[Structure].ThermalTime
          LeafCohort InitialLeaf1: Rank=1; Area=1000
            zero: NReallocationFactor, DMReallocationFactor, NRetranslocationFactor, DMRetranslocationFactor, ShadeInducedSenRate, SenescedFrac, DeltaPotentialArea, DeltaStressConstrainedArea, DeltaCarbonConstrainedArea, PotentialStructuralDMAllocation, PotentialMetabolicDMAllocation, MetabolicNReallocated, MetabolicWtReallocated, StorageNReallocated, StorageWtReallocated, MetabolicNRetranslocated, StorageNRetrasnlocated, DMRetranslocated, MetabolicNAllocation, StructuralDMAllocation, MetabolicDMAllocation
          LeafCohort InitialLeaf2: Rank=2
            zero: NReallocationFactor, DMReallocationFactor, NRetranslocationFactor, DMRetranslocationFactor, ShadeInducedSenRate, SenescedFrac, DeltaPotentialArea, DeltaStressConstrainedArea, DeltaCarbonConstrainedArea, PotentialStructuralDMAllocation, PotentialMetabolicDMAllocation, MetabolicNReallocated, MetabolicWtReallocated, StorageNReallocated, StorageWtReallocated, MetabolicNRetranslocated, StorageNRetrasnlocated, DMRetranslocated, MetabolicNAllocation, StructuralDMAllocation, MetabolicDMAllocation, Area
          LeafCohort InitialLeaf3: Rank=3
            zero: NReallocationFactor, DMReallocationFactor, NRetranslocationFactor, DMRetranslocationFactor, ShadeInducedSenRate, SenescedFrac, DeltaPotentialArea, DeltaStressConstrainedArea, DeltaCarbonConstrainedArea, PotentialStructuralDMAllocation, PotentialMetabolicDMAllocation, MetabolicNReallocated, MetabolicWtReallocated, StorageNReallocated, StorageWtReallocated, MetabolicNRetranslocated, StorageNRetrasnlocated, DMRetranslocated, MetabolicNAllocation, StructuralDMAllocation, MetabolicDMAllocation, Area
          LeafCohortParameters CohortParameters: ExpansionStressValue=0; CellDivisionStressValue=0; LagAccelerationValue=0; SenescenceAccelerationValue=0; ShadeInducedSenescenceRateValue=0; SenessingLeafRelativeSizeValue=0
            Constant DMReallocationFactor: FixedValue=1; Units=percentage
            Constant DMRetranslocationFactor: FixedValue=1; Units=percentage
            LinearInterpolationFunction MaxArea
              XYPairs: X=[0, 5, 25]; Y=[6000, 12000, 12000]
              VariableReference XValue: VariableName=[Leaf].AppearedCohortNo
            LinearInterpolationFunction GrowthDuration
              XYPairs: X=[0, 7, 12, 25, 26]; Y=[16, 14.5, 14, 14, 14]
              VariableReference XValue: VariableName=[Leaf].AppearedCohortNo
            Constant LagDuration: FixedValue=40; Units=development day
            Constant SenescenceDuration: FixedValue=5; Units=development day
            Constant DetachmentLagDuration: FixedValue=1; Units=development day
            Constant DetachmentDuration: FixedValue=1; Units=development day
            Constant SpecificLeafAreaMax: FixedValue=20000; Units=mm2/g
            Constant SpecificLeafAreaMin: FixedValue=15000; Units=mm2/g
            Constant StructuralFraction: FixedValue=0.8; Units=percentage
            Constant MinimumNConc: FixedValue=0.002; Units=g/g
            Constant CriticalNConc: FixedValue=0.015; Units=g/g
            Constant InitialNConc: FixedValue=0.025; Units=g/g
            LinearInterpolationFunction MaximumNConc
              XYPairs: X=[0, 100, 150, 177, 335, 336, 366]; Y=[0.02, 0.02, 0.03, 0.025, 0.02, 0.02, 0.02]
              VariableReference XValue: VariableName=[Weather].DaysSinceWinterSolstice
            Constant NReallocationFactor: FixedValue=0.7; Units=percentage
            Constant NRetranslocationFactor: FixedValue=0.1; Units=percentage
            Constant ShadeInducedSenescenceRate: FixedValue=0
            Constant StorageFraction: FixedValue=0; Units=percentage
            Constant SenessingLeafRelativeSize: FixedValue=1; Units=0-1
            Constant LeafSizeShapeParameter: FixedValue=0.01
              Units=parameter controls the logistic growth of the leaf in growth stage
            Constant CellDivisionStress: FixedValue=1; Units=0-1
            ArrayFunction LagDurationAgeMultiplier: Values=1 1 1
            ArrayFunction SenescenceDurationAgeMultiplier: Values=1 1 1
            ArrayFunction LeafSizeAgeMultiplier: Values=1 1 1 1 1 1 1 1 1 1 1 1
            Constant RemobilisationCost: FixedValue=0
            Constant CarbonConcentration: FixedValue=0.4
            LessThanFunction LagAcceleration
              VariableReference DAWS: VariableName=[Weather].DaysSinceWinterSolstice
              Constant Autumn: FixedValue=250; Units=make sure the photoperiod is decreasing
              Constant One: FixedValue=1
              LinearInterpolationFunction PhotoPeriodEffect
                XYPairs: X=[9.5, 11, 12, 14]; Y=[2.2, 1.2, 1, 1]
                PhotoperiodFunction XValue: Twilight=0; DayLength=0
            LessThanFunction SenescenceAcceleration: same as Vineyard.Row.Pear.Leaf.CohortParameters.LagAcceleration
            MultiplyFunction MaintenanceRespirationFunction
              Constant Qm: FixedValue=0.03; Units=g/g
              ExponentialFunction TempResponse: A=0; B=1; C=0.045
                Memo
                  The temperature-dependent parameter is set so that the respiration rate doubles for every 10 oC increase in temperature.
                SubtractFunction TempDiff
                  VariableReference Xvalue: VariableName=[Weather].MeanT
                  Constant RefT: FixedValue=20
            LinearInterpolationFunction ExpansionStress
              XYPairs: X=[0, 1, 1.5]; Y=[0, 1, 1]
              VariableReference XValue: VariableName=[Leaf].Fw
          RUEModel Photosynthesis
            PhaseLookup RUE
              PhaseLookupValue Vegetative: Start=BudBurst; End=FloweringTime
                Constant: FixedValue=0.8; Units=g/MJ
              PhaseLookupValue Reproductive: Start=FloweringTime; End=LeafFall
                Constant: FixedValue=0.9; Units=g/MJ
            RUECO2Function FCO2: PhotosyntheticPathway=C3
            LinearInterpolationFunction FN
              XYPairs: X=[0, 1, 1.5]; Y=[1, 1, 1]
              VariableReference XValue: VariableName=[Leaf].Fn
            WeightedTemperatureFunction FT: MaximumTemperatureWeighting=0.75
              XYPairs: X=[5, 20, 30, 45]; Y=[1, 1, 1, 0]
            LinearInterpolationFunction FVPD
              XYPairs: X=[0, 10, 50]; Y=[1, 1, 1]
              VariableReference XValue: VariableName=[Leaf].Photosynthesis.VPD
            VariableReference RadnInt: VariableName=[Leaf].RadiationIntercepted
            LinearInterpolationFunction FW
              XYPairs: X=[0, 1, 1.5]; Y=[0, 1, 1]
              VariableReference XValue: VariableName=[Leaf].Fw
          MinimumFunction FRGRFunction
            VariableReference RUE_FT: VariableName=[Leaf].Photosynthesis.FT
            MinimumFunction Others
              VariableReference RUE_FN: VariableName=[Leaf].Photosynthesis.FN
              VariableReference RUE_FVPD: VariableName=[Leaf].Photosynthesis.FVPD
          Constant ExtinctionCoeff: FixedValue=0.6
          CompositeBiomass Total: OrganNames=[Leaf]; IncludeLive=true; IncludeDead=true
          BiomassRemoval BiomassRemovalDefaults: HarvestFractionLiveToRemove=0; HarvestFractionDeadToRemove=0; HarvestFractionLiveToResidue=0; HarvestFractionDeadToResidue=0
          Constant DMConversionEfficiency: FixedValue=0.83
          Constant RemobilisationCost: FixedValue=0
          Constant CarbonConcentration: FixedValue=0.4
          Constant StructuralFraction: FixedValue=0.8; Units=g/g
          Constant StomatalConductanceCO2Modifier: FixedValue=1
          NutrientPoolFunctions DMDemandPriorityFactors
            Constant Structural: FixedValue=1.6
            Constant Metabolic: FixedValue=1.6
            Constant Storage: FixedValue=0.01
          Constant FrostFraction: FixedValue=0
          MultiplyFunction WidthFunction
            LinearInterpolationFunction AgeFactor
              XYPairs: X=[0, 3, 10, 20]; Y=[0.5, 1, 1, 1]
              VariableReference XValue: VariableName=[Phenology].Age.Years
            LinearInterpolationFunction SeasonalWidthPattern
              XYPairs: X=[0, 80, 170, 335, 361]; Y=[10, 200, 470, 470, 10]
              VariableReference XValue: VariableName=[Weather].DaysSinceWinterSolstice
          NutrientPoolFunctions NDemandPriorityFactors
            Constant Structural: FixedValue=1
            Constant Metabolic: FixedValue=1
            Constant Storage: FixedValue=1
          SubtractFunction DepthFunction
            VariableReference Height: VariableName=[Structure].HeightModel
            VariableReference BaseHeight: VariableName=[Structure].HeightModel.BaseHeight
        GenericOrgan Shoot: IsAboveGround=true
          NutrientDemandFunctions DMDemands
            MaximumFunction Structural
              DeltaFunction Structural: StartStageName=Endodormancy
                MultiplyFunction Integral
                  VariableReference ShootPopulation: VariableName=[Structure].MainStemPopn
                  BetaGrowthFunction: tm=0; te=0
                    Constant Ymax: FixedValue=30; Units=g
                    VariableReference XValue: VariableName=[Shoot].ThermalTimeAfterBudBurst
              Constant Metabolic: FixedValue=0
            Constant Metabolic: FixedValue=0
            MaximumFunction Storage
              MultiplyFunction Storage
                SubtractFunction StorageDeficit
                  MultiplyFunction StructuralWt
                    VariableReference StructuralWt: VariableName=[Pear].Shoot.Live.Wt
                    Constant MaxConcentration: FixedValue=0.26; Units=gStorageDM/gStructureDM
                  VariableReference StorageWt: VariableName=[Pear].Shoot.Live.StorageWt
                BetaGrowthFunction DailySynthesis: tm=34.4; te=54
                  Constant Ymax: FixedValue=0.03
                  VariableReference XValue: VariableName=[Shoot].ThermalTimeAfterBudBurst
              Constant Zero: FixedValue=0
            Constant QStructuralPriority: FixedValue=0.0036
            Constant QMetabolicPriority: FixedValue=0.001
            Constant QStoragePriority: FixedValue=0.3; Units=gc/gDM
          Constant NReallocationFactor: FixedValue=1; Units=percentage
          Constant NRetranslocationFactor: FixedValue=0.1; Units=percentage
          PhaseLookupValue NitrogenDemandSwitch: Start=BudBurst; End=LeafFall
            Constant: FixedValue=1
          LinearInterpolationFunction MaximumNConc
            XYPairs: X=[0, 100, 150, 177, 335, 336, 366]; Y=[0.01, 0.01, 0.035, 0.015, 0.01, 0.01, 0.01]
            VariableReference XValue: VariableName=[Weather].DaysSinceWinterSolstice
              VariableReference XValue: VariableName=[Weather].DaysSinceWinterSolstice
          Constant MinimumNConc: FixedValue=0.001; Units=g/g
          BiomassRemoval BiomassRemovalDefaults: HarvestFractionLiveToRemove=0; HarvestFractionDeadToRemove=0; HarvestFractionLiveToResidue=0; HarvestFractionDeadToResidue=0
          Constant DetachmentRateFunction: FixedValue=0; Units=1/g
          Constant SenescenceRate: FixedValue=0; Units=/d
          Constant DMConversionEfficiency: FixedValue=0.83; Units=0-1
          Constant DMReallocationFactor: FixedValue=1
          VariableReference CriticalNConc: VariableName=[Shoot].MinimumNConc
          Constant RemobilisationCost: FixedValue=0
          Constant CarbonConcentration: FixedValue=0.4
          NutrientDemandFunctions NDemands
            MultiplyFunction Structural
              VariableReference MinNconc: VariableName=[Shoot].minimumNconc
              VariableReference PotentialDMAllocation: VariableName=[Shoot].potentialDMAllocation.Structural
            MultiplyFunction Metabolic
              SubtractFunction MetabolicNconc
                VariableReference CritNconc: VariableName=[Shoot].criticalNConc
                VariableReference MinNconc: VariableName=[Shoot].minimumNconc
              VariableReference PotentialDMAllocation: VariableName=[Shoot].potentialDMAllocation.Structural
            StorageNDemandFunction Storage
              VariableReference NitrogenDemandSwitch: VariableName=[Shoot].nitrogenDemandSwitch
              VariableReference MaxNconc: VariableName=[Shoot].maximumNconc
            Constant QStructuralPriority: FixedValue=1
            Constant QMetabolicPriority: FixedValue=1
            Constant QStoragePriority: FixedValue=1
          Constant DMRetranslocationFactor: FixedValue=0.04; Units=percentage
          RetranslocateNonStructural RetranslocateNitrogen
          AccumulateFunction ThermalTimeAfterBudBurst: StartStageName=BudBurst; EndStageName=LeafFall; ResetStageName=Ecodormancy; FractionRemovedOnCut=0; FractionRemovedOnHarvest=0; FractionRemovedOnGraze=0; FractionRemovedOnPrune=0
            VariableReference ThermalTime: VariableName=[Phenology].ThermalTime
          NutrientPoolFunctions InitialWt
            Constant Structural: FixedValue=0; Units=g/m^2
            Constant Metabolic: FixedValue=0
            Constant Storage: FixedValue=0
          MultiplyFunction MaintenanceRespirationFunction
            Constant Qm: FixedValue=0.01
            ExponentialFunction TempResponse: A=0; B=1; C=0.045
              SubtractFunction TempDiff
                VariableReference Xvalue: VariableName=[Weather].MeanT
                Constant RefT: FixedValue=20
          Constant Photosynthesis: FixedValue=0
          VariableReference initialNConcFunction: VariableName=[Shoot].MaximumNConc
        GenericOrgan Cane: IsAboveGround=true
          NutrientDemandFunctions DMDemands
            Constant Metabolic: FixedValue=0
            PhaseLookup Structural
              PhaseLookupValue GrowingSeason: Start=BudBurst; End=LeafFall
                MultiplyFunction Structural
                  Constant 2: FixedValue=2
                  Constant PI: FixedValue=3.1415926
                  PowerFunction Radius: Exponent=0.5
                    DivideFunction RadiusSquare
                      VariableReference Wt: VariableName=[Cane].Live.Wt
                      VariableReference population: VariableName=[Pear].Population
                      VariableReference CaneNumber: VariableName=[Cane].CaneNumber
                      Constant Density: FixedValue=500000; Units=g/m3
                      VariableReference Length: VariableName=[Cane].CaneLength
                      Constant PI: FixedValue=3.1415926
                  Constant Density: FixedValue=400000; Units=g/m3
                  Constant RadiusGR: FixedValue=9e-06; Units=meter
                  VariableReference Length: VariableName=[Cane].CaneLength
                  VariableReference Population: VariableName=[Pear].Population
                  VariableReference CaneNumber: VariableName=[Cane].CaneNumber
            PhaseLookup Storage
              PhaseLookupValue GrowingSeason: Start=BudBurst; End=LeafFall
                MultiplyFunction Storage
                  SubtractFunction StorageDeficit
                    MultiplyFunction StructuralWt
                      VariableReference StructuralWt: VariableName=[Pear].Cane.Live.StructuralWt
                      Constant MaxConcentration: FixedValue=0.26; Units=gStorageDM/gStructureDM
                    VariableReference StorageWt: VariableName=[Pear].Cane.Live.StorageWt
                  BetaGrowthFunction DailySynthesis: tm=34.4; te=54
                    Constant Ymax: FixedValue=0.03
                    VariableReference XValue: VariableName=[Shoot].ThermalTimeAfterBudBurst
            Constant QStructuralPriority: FixedValue=0.700062
            Constant QMetabolicPriority: FixedValue=0.001
            Constant QStoragePriority: FixedValue=0.61; Units=gc/gDM
          Constant CaneDiameter: FixedValue=10; Units=mm
          Constant CaneLength: FixedValue=0.9; Units=meter
          Constant DMReallocationFactor: FixedValue=1
          Constant DMRetranslocationFactor: FixedValue=0.037; Units=percentage
          Constant NReallocationFactor: FixedValue=1; Units=percentage
          Constant NRetranslocationFactor: FixedValue=0.04; Units=percentage
          PhaseLookupValue NitrogenDemandSwitch: Start=BudBurst; End=FloweringTime
            Constant: FixedValue=1
          BiomassRemoval BiomassRemovalDefaults: HarvestFractionLiveToRemove=0; HarvestFractionDeadToRemove=0; HarvestFractionLiveToResidue=0; HarvestFractionDeadToResidue=0
          Constant DetachmentRateFunction: FixedValue=0; Units=/d
          Constant SenescenceRate: FixedValue=0; Units=/d
          Constant DMConversionEfficiency: FixedValue=0.83; Units=0-1
          Constant MinimumNConc: FixedValue=0.001; Units=g/g
          VariableReference CriticalNConc: VariableName=[Cane].MinimumNConc
          Constant RemobilisationCost: FixedValue=0
          Constant CarbonConcentration: FixedValue=0.4
          Constant CaneNumber: FixedValue=4
          NutrientDemandFunctions NDemands
            MultiplyFunction Structural
              VariableReference MinNconc: VariableName=[Cane].minimumNconc
              VariableReference PotentialDMAllocation: VariableName=[Cane].potentialDMAllocation.Structural
            MultiplyFunction Metabolic
              SubtractFunction MetabolicNconc
                VariableReference CritNconc: VariableName=[Cane].criticalNConc
                VariableReference MinNconc: VariableName=[Cane].minimumNconc
              VariableReference PotentialDMAllocation: VariableName=[Cane].potentialDMAllocation.Structural
            StorageNDemandFunction Storage
              VariableReference NitrogenDemandSwitch: VariableName=[Cane].nitrogenDemandSwitch
              VariableReference MaxNconc: VariableName=[Cane].maximumNconc
            Constant QStructuralPriority: FixedValue=1
            Constant QMetabolicPriority: FixedValue=1
            Constant QStoragePriority: FixedValue=1
          RetranslocateNonStructural RetranslocateNitrogen
          NutrientPoolFunctions InitialWt
            Constant Structural: FixedValue=77.5; Units=g/m^2
            Constant Metabolic: FixedValue=0
            Constant Storage: FixedValue=19
          Constant initialNConcFunction: FixedValue=0.015; Units=g/g
          Constant MaximumNConc: FixedValue=0.015
          Constant Photosynthesis: FixedValue=0
          LessThanFunction MaintenanceRespirationFunction
            VariableReference FirstGrowthSeason: VariableName=[Phenology].FirstGrowthSeason
            Constant CheckValue: FixedValue=0.5
            Constant 0: FixedValue=0
            MultiplyFunction MaintenanceRespirationFunction
              Constant Qm: FixedValue=0.0005
              ExponentialFunction TempResponse: same as Vineyard.Row.Pear.Shoot.MaintenanceRespirationFunction.TempResponse
        GenericOrgan Trunk: IsAboveGround=true
          NutrientPoolFunctions InitialWt
            Constant Structural: FixedValue=280; Units=g/m^2
            Constant Metabolic: FixedValue=0
            Constant Storage: FixedValue=200
          Constant DMRetranslocationFactor: FixedValue=0.037
          Constant DMReallocationFactor: FixedValue=1
          Constant DMConversionEfficiency: FixedValue=0.83; Units=0-1
          Constant NReallocationFactor: FixedValue=1
          Constant NRetranslocationFactor: FixedValue=0.04
          PhaseLookupValue NitrogenDemandSwitch: Start=Ecodormancy; End=FruitMaturation
            Constant: FixedValue=1
          Constant MinimumNConc: FixedValue=0.001
          BiomassRemoval BiomassRemovalDefaults: HarvestFractionLiveToRemove=0; HarvestFractionDeadToRemove=0; HarvestFractionLiveToResidue=0; HarvestFractionDeadToResidue=0
          Constant DetachmentRateFunction: FixedValue=0; Units=/d
          VariableReference CriticalNConc: VariableName=[Trunk].MinimumNConc
          Constant RemobilisationCost: FixedValue=0
          Constant CarbonConcentration: FixedValue=0.4
          NutrientDemandFunctions NDemands
            MultiplyFunction Structural
              VariableReference MinNconc: VariableName=[Trunk].minimumNconc
              VariableReference PotentialDMAllocation: VariableName=[Trunk].potentialDMAllocation.Structural
            MultiplyFunction Metabolic
              SubtractFunction MetabolicNconc
                VariableReference CritNconc: VariableName=[Trunk].criticalNConc
                VariableReference MinNconc: VariableName=[Trunk].minimumNconc
              VariableReference PotentialDMAllocation: VariableName=[Trunk].potentialDMAllocation.Structural
            StorageNDemandFunction Storage
              VariableReference NitrogenDemandSwitch: VariableName=[Trunk].nitrogenDemandSwitch
              VariableReference MaxNconc: VariableName=[Trunk].maximumNconc
            Constant QStructuralPriority: FixedValue=1
            Constant QMetabolicPriority: FixedValue=1
            Constant QStoragePriority: FixedValue=1
          RetranslocateNonStructural RetranslocateNitrogen
          Constant TrunkDiameter: FixedValue=75; Units=mm
          Constant TrunkLength: FixedValue=0.8; Units=meter
          NutrientDemandFunctions DMDemands
            PhaseLookup Structural
              PhaseLookupValue GrowingSeason: Start=BudBurst; End=LeafFall
                MultiplyFunction Structural
                  Constant 2: FixedValue=2
                  Constant PI: FixedValue=3.1415926
                  PowerFunction Radius: Exponent=0.5
                    DivideFunction RadiusSquare
                      VariableReference Wt: VariableName=[Trunk].Live.Wt
                      VariableReference population: VariableName=[Pear].Population
                      Constant PI: FixedValue=3.1415926
                      VariableReference Length: VariableName=[Trunk].TrunkLength
                      Constant Density: FixedValue=500000; Units=g/m3
                  VariableReference Length: VariableName=[Trunk].TrunkLength
                  Constant Density: FixedValue=500000; Units=g/m3
                  Constant RadiusGR: FixedValue=8e-06; Units=meter
                  VariableReference Population: VariableName=[Pear].Population
                  LinearInterpolationFunction Age
                    XYPairs: X=[1, 5, 10, 20, 30, 40, 80]; Y=[1, 1, 0.9, 0.5, 0.25, 0.14, 0.02]
                    VariableReference XValue: VariableName=[Phenology].Age.Years
            PhaseLookup Storage
              PhaseLookupValue GrowingSeason: Start=BudBurst; End=LeafFall
                MaximumFunction Storage
                  MultiplyFunction Storage
                    SubtractFunction StorageDeficit
                      MultiplyFunction StructuralWt
                        VariableReference StructuralWt: VariableName=[Pear].Trunk.Live.StructuralWt
                        Constant MaxConcentration: FixedValue=0.26; Units=gStorageDM/gStructureDM
                      VariableReference StorageWt: VariableName=[Pear].Trunk.Live.StorageWt
                    BetaGrowthFunction DailySynthesis: tm=34.4; te=54
                      Constant Ymax: FixedValue=0.03
                      VariableReference XValue: VariableName=[Shoot].ThermalTimeAfterBudBurst
                  Constant Zero: FixedValue=0
            Constant Metabolic: FixedValue=0
            Constant QStructuralPriority: FixedValue=0.700062
            Constant QMetabolicPriority: FixedValue=0.001
            Constant QStoragePriority: FixedValue=0.61; Units=gc/gDM
          Constant initialNConcFunction: FixedValue=0.015; Units=g/g
          Constant MaximumNConc: FixedValue=0.01
          Constant Photosynthesis: FixedValue=0
          LessThanFunction MaintenanceRespirationFunction: same as Vineyard.Row.Pear.Cane.MaintenanceRespirationFunction
          LessThanFunction SenescenceRate
            VariableReference FirstGrowthSeason: VariableName=[Phenology].FirstGrowthSeason
            Constant CheckValue: FixedValue=0.5
            Constant 0: FixedValue=0
            Constant SenescenceRate: FixedValue=1e-05
        GenericOrgan StructuralRoot: IsAboveGround=true
          NutrientDemandFunctions DMDemands
            PhaseLookup Structural
              PhaseLookupValue GrowingSeason: Start=BudBurst; End=LeafFall
                MultiplyFunction Structural
                  Constant 2: FixedValue=2
                  Constant PI: FixedValue=3.1415926
                  PowerFunction Radius: same as Vineyard.Row.Pear.Trunk.DMDemands.Structural.GrowingSeason.Structural.Radius
                  VariableReference Length: VariableName=[Trunk].TrunkLength
                  Constant Density: FixedValue=500000; Units=g/m3
                  Constant RadiusGR: FixedValue=8e-06; Units=meter
                  VariableReference Population: VariableName=[Pear].Population
                  Constant RootTrunkRatio: FixedValue=1
                  LinearInterpolationFunction Age
                    XYPairs: X=[1, 5, 10, 20, 30, 40, 80]; Y=[1, 1, 0.9, 0.5, 0.25, 0.14, 0.02]
                    VariableReference XValue: VariableName=[Phenology].Age.Years
            PhaseLookup Storage
              PhaseLookupValue GrowingSeason: Start=BudBurst; End=LeafFall
                MaximumFunction Storage
                  MultiplyFunction Storage
                    SubtractFunction StorageDeficit
                      MultiplyFunction StructuralWt
                        VariableReference StructuralWt: VariableName=[Pear].StructuralRoot.Live.StructuralWt
                        Constant MaxConcentration: FixedValue=0.26; Units=gStorageDM/gStructureDM
                      VariableReference StorageWt: VariableName=[Pear].StructuralRoot.Live.StorageWt
                    BetaGrowthFunction DailySynthesis: tm=34.4; te=54
                      Constant Ymax: FixedValue=0.03
                      VariableReference XValue: VariableName=[Shoot].ThermalTimeAfterBudBurst
                  Constant Zero: FixedValue=0
            Constant Metabolic: FixedValue=0
            Constant QStructuralPriority: FixedValue=0.700062
            Constant QMetabolicPriority: FixedValue=0.001
            Constant QStoragePriority: FixedValue=0.65; Units=gc/gDM
          NutrientPoolFunctions InitialWt: same as Vineyard.Row.Pear.Trunk.InitialWt
          Constant DMRetranslocationFactor: FixedValue=0.037
          Constant DMReallocationFactor: FixedValue=1
          Constant DMConversionEfficiency: FixedValue=0.83; Units=0-1
          Constant NReallocationFactor: FixedValue=1
          Constant NRetranslocationFactor: FixedValue=0.04
          PhaseLookupValue NitrogenDemandSwitch: Start=Ecodormancy; End=LeafFall
            Constant: FixedValue=1
          Constant MinimumNConc: FixedValue=0.0005
          Constant MaximumNConc: FixedValue=0.015
          BiomassRemoval BiomassRemovalDefaults: HarvestFractionLiveToRemove=0; HarvestFractionDeadToRemove=0; HarvestFractionLiveToResidue=0; HarvestFractionDeadToResidue=0
          Constant DetachmentRateFunction: FixedValue=0; Units=/d
          VariableReference CriticalNConc: VariableName=[Trunk].MinimumNConc
          Constant RemobilisationCost: FixedValue=0
          Constant CarbonConcentration: FixedValue=0.4
          NutrientDemandFunctions NDemands: same as Vineyard.Row.Pear.Trunk.NDemands
          RetranslocateNonStructural RetranslocateNitrogen
          Constant initialNConcFunction: FixedValue=0.015; Units=g/g
          Constant Photosynthesis: FixedValue=0
          LessThanFunction SenescenceRate
            VariableReference FirstGrowthSeason: VariableName=[Phenology].FirstGrowthSeason
            Constant CheckValue: FixedValue=0.5
            Constant 0: FixedValue=0
            MultiplyFunction SenescenceRate
              LinearInterpolationFunction SenescenceRate
                XYPairs
                  X=[0, 61, 122, 153, 192, 275, 310, 366]
                  Y=[0.001484, 0.001484, 0.001973, 0.005178, 0.01264, 0.013, 0.003, 0.001484]
                VariableReference XValue: VariableName=[Weather].DaysSinceWinterSolstice
              Constant Scale: FixedValue=0.01
          LessThanFunction MaintenanceRespirationFunction: same as Vineyard.Row.Pear.Cane.MaintenanceRespirationFunction
        ReproductiveOrgan Berry: GrowthRespiration=0; MaintenanceRespiration=0
          Biomass Live
          Biomass Dead
          Folder MetFactors
            DivideFunction BUN_TmaxIni
              AccumulateByNumericPhase TmaxIni: StartStageName=3.5168; EndStageName=3.5168; ResetStageName=BudBurst; FractionRemovedOnCut=0; FractionRemovedOnHarvest=0; FractionRemovedOnGraze=0; FractionRemovedOnPrune=0
                VariableReference Tmax: VariableName=[Weather].MaxT
              AccumulateByNumericPhase Time: StartStageName=3.5168; EndStageName=4.7841; ResetStageName=BudBurst; FractionRemovedOnCut=0; FractionRemovedOnHarvest=0; FractionRemovedOnGraze=0; FractionRemovedOnPrune=0
                Constant Days: FixedValue=1; Units=days/day
            DivideFunction BUN_RadIni
              AccumulateByNumericPhase RadIni: StartStageName=3.7585; EndStageName=3.9206; ResetStageName=BudBurst; FractionRemovedOnCut=0; FractionRemovedOnHarvest=0; FractionRemovedOnGraze=0; FractionRemovedOnPrune=0
                VariableReference Rad: VariableName=[Weather].Radn
              AccumulateByNumericPhase Time: StartStageName=3.7585; EndStageName=3.9206; ResetStageName=BudBurst; FractionRemovedOnCut=0; FractionRemovedOnHarvest=0; FractionRemovedOnGraze=0; FractionRemovedOnPrune=0
                Constant Days: FixedValue=1; Units=days/day
            DivideFunction BUN_CarbonIni
              AccumulateByNumericPhase FDMIni: StartStageName=3.2; EndStageName=5.2; ResetStageName=BudBurst; FractionRemovedOnCut=0; FractionRemovedOnHarvest=0; FractionRemovedOnGraze=0; FractionRemovedOnPrune=0
                VariableReference FDM: VariableName=[Pear].Arbitrator.FDM
              AccumulateByNumericPhase Time: StartStageName=3.2; EndStageName=5.2; ResetStageName=BudBurst; FractionRemovedOnCut=0; FractionRemovedOnHarvest=0; FractionRemovedOnGraze=0; FractionRemovedOnPrune=0
                Constant Days: FixedValue=1; Units=days/day
            DivideFunction BEN_TmaxFlow
              AccumulateByNumericPhase TmaxFlow: StartStageName=3.7752; EndStageName=4.0962; ResetStageName=BudBurst; FractionRemovedOnCut=0; FractionRemovedOnHarvest=0; FractionRemovedOnGraze=0; FractionRemovedOnPrune=0
                VariableReference Tmax: VariableName=[Weather].MaxT
              AccumulateByNumericPhase Time: StartStageName=3.7752; EndStageName=4.0962; ResetStageName=BudBurst; FractionRemovedOnCut=0; FractionRemovedOnHarvest=0; FractionRemovedOnGraze=0; FractionRemovedOnPrune=0
                Constant Days: FixedValue=1; Units=days/day
            DivideFunction BEN_TminFlow
              AccumulateByNumericPhase TminFlow: StartStageName=3.8036; EndStageName=4.2517; ResetStageName=BudBurst; FractionRemovedOnCut=0; FractionRemovedOnHarvest=0; FractionRemovedOnGraze=0; FractionRemovedOnPrune=0
                VariableReference Tmin: VariableName=[Weather].MinT
              AccumulateByNumericPhase Time: StartStageName=3.8036; EndStageName=4.2517; ResetStageName=BudBurst; FractionRemovedOnCut=0; FractionRemovedOnHarvest=0; FractionRemovedOnGraze=0; FractionRemovedOnPrune=0
                Constant Days: FixedValue=1; Units=days/day
            DivideFunction BEN_TmaxIni
              AccumulateByNumericPhase TmaxIni: StartStageName=3.7336; EndStageName=5.4935; ResetStageName=BudBurst; FractionRemovedOnCut=0; FractionRemovedOnHarvest=0; FractionRemovedOnGraze=0; FractionRemovedOnPrune=0
                VariableReference Tmax: VariableName=[Weather].MaxT
              AccumulateByNumericPhase Time: StartStageName=3.7336; EndStageName=5.4935; ResetStageName=BudBurst; FractionRemovedOnCut=0; FractionRemovedOnHarvest=0; FractionRemovedOnGraze=0; FractionRemovedOnPrune=0
                Constant Days: FixedValue=1; Units=days/day
            DivideFunction BEN_RainTotFlow
              AccumulateByNumericPhase RainTotFlow: StartStageName=3.631338; EndStageName=4.526451; ResetStageName=BudBurst; FractionRemovedOnCut=0; FractionRemovedOnHarvest=0; FractionRemovedOnGraze=0; FractionRemovedOnPrune=0
                VariableReference RainTot: VariableName=[Weather].Rain
              Constant Days: FixedValue=1
            DivideFunction BEN_CarbonFlow
              AccumulateByNumericPhase FDMFlow: StartStageName=3.08; EndStageName=4.05; ResetStageName=BudBurst; FractionRemovedOnCut=0; FractionRemovedOnHarvest=0; FractionRemovedOnGraze=0; FractionRemovedOnPrune=0
                VariableReference FDM: VariableName=[Pear].Arbitrator.FDM
              AccumulateByNumericPhase Time: StartStageName=3.08; EndStageName=4.05; ResetStageName=BudBurst; FractionRemovedOnCut=0; FractionRemovedOnHarvest=0; FractionRemovedOnGraze=0; FractionRemovedOnPrune=0
                Constant Days: FixedValue=1; Units=days/day
            DivideFunction BM_TmaxFlow
              AccumulateByNumericPhase TmaxFlow: StartStageName=3.6763; EndStageName=3.9052; ResetStageName=BudBurst; FractionRemovedOnCut=0; FractionRemovedOnHarvest=0; FractionRemovedOnGraze=0; FractionRemovedOnPrune=0
                VariableReference Tmax: VariableName=[Weather].MaxT
              AccumulateByNumericPhase Time: StartStageName=3.6763; EndStageName=3.9052; ResetStageName=BudBurst; FractionRemovedOnCut=0; FractionRemovedOnHarvest=0; FractionRemovedOnGraze=0; FractionRemovedOnPrune=0
                Constant Days: FixedValue=1; Units=days/day
            DivideFunction BM_RainTotFlow
              AccumulateByNumericPhase RainTotFlow: StartStageName=3.5555; EndStageName=5; ResetStageName=BudBurst; FractionRemovedOnCut=0; FractionRemovedOnHarvest=0; FractionRemovedOnGraze=0; FractionRemovedOnPrune=0
                VariableReference RainTot: VariableName=[Weather].Rain
              Constant Days: FixedValue=1
            DivideFunction BM_RadFlow
              AccumulateByNumericPhase RadFlow: StartStageName=3.046; EndStageName=3.8455; ResetStageName=BudBurst; FractionRemovedOnCut=0; FractionRemovedOnHarvest=0; FractionRemovedOnGraze=0; FractionRemovedOnPrune=0
                VariableReference Rad: VariableName=[Weather].Radn
              AccumulateByNumericPhase Time: StartStageName=3.046; EndStageName=3.8455; ResetStageName=BudBurst; FractionRemovedOnCut=0; FractionRemovedOnHarvest=0; FractionRemovedOnGraze=0; FractionRemovedOnPrune=0
                Constant Days: FixedValue=1; Units=days/day
            DivideFunction BM_RainTotVer
              AccumulateByNumericPhase RainTotVer: StartStageName=5.09; EndStageName=5.5758; ResetStageName=BudBurst; FractionRemovedOnCut=0; FractionRemovedOnHarvest=0; FractionRemovedOnGraze=0; FractionRemovedOnPrune=0
                VariableReference RainTot: VariableName=[Weather].Rain
              Constant Days: FixedValue=1
            DivideFunction BM_CarbonFlow
              AccumulateByNumericPhase FDMFlow: StartStageName=3.32; EndStageName=4.06; ResetStageName=BudBurst; FractionRemovedOnCut=0; FractionRemovedOnHarvest=0; FractionRemovedOnGraze=0; FractionRemovedOnPrune=0
                VariableReference FDM: VariableName=[Pear].Arbitrator.FDM
              AccumulateByNumericPhase Time: StartStageName=3.32; EndStageName=4.06; ResetStageName=BudBurst; FractionRemovedOnCut=0; FractionRemovedOnHarvest=0; FractionRemovedOnGraze=0; FractionRemovedOnPrune=0
                Constant Days: FixedValue=1; Units=days/day
            DivideFunction BEN_CarbonIni
              AccumulateByNumericPhase FDMIni: StartStageName=4; EndStageName=5.83; ResetStageName=BudBurst; FractionRemovedOnCut=0; FractionRemovedOnHarvest=0; FractionRemovedOnGraze=0; FractionRemovedOnPrune=0
                VariableReference FDM: VariableName=[Pear].Arbitrator.FDM
              AccumulateByNumericPhase Time: StartStageName=4; EndStageName=5.83; ResetStageName=BudBurst; FractionRemovedOnCut=0; FractionRemovedOnHarvest=0; FractionRemovedOnGraze=0; FractionRemovedOnPrune=0
                Constant Days: FixedValue=1; Units=days/day
            OnEventFunction BUN_TmaxIni_Record: SetEvent=Ecodormancy
              Constant PreEventValue: FixedValue=21
              VariableReference PostEventValue: VariableName=[Berry].MetFactors.BUN_TmaxIni
            OnEventFunction BUN_RadIni_Record: SetEvent=Ecodormancy
              Constant PreEventValue: FixedValue=21
              VariableReference PostEventValue: VariableName=[Berry].MetFactors.BUN_RadIni
            OnEventFunction BUN_CarbonIni_Record: SetEvent=Ecodormancy
              Constant PreEventValue: FixedValue=1; Units=[Berry].MetFactors.BUN_CarbonIni
              VariableReference PostEventValue: VariableName=[Berry].MetFactors.BUN_CarbonIni
            OnEventFunction BEN_TmaxIni_Record: SetEvent=BudBurst; ReSetEvent=FloweringTime
              Constant PreEventValue: FixedValue=21
              VariableReference PostEventValue: VariableName=[Berry].MetFactors.BEN_TmaxIni
            OnEventFunction BEN_CarbonIni_Record: SetEvent=Ecodormancy
              Constant PreEventValue: FixedValue=1
              VariableReference PostEventValue: VariableName=[Berry].MetFactors.BEN_CarbonIni
          Folder YieldComponent
            OnEventFunction BunchesPerShoot: SetEvent=BudBurst; ReSetEvent=Ecodormancy
              Constant PreEventValue: FixedValue=1.7
              MinimumFunction PostEventValue
                MaximumFunction MaximumFunc
                  MultiplyFunction BunchesPerShootFun
                    AddFunction MetFun
                      Constant Intercept: FixedValue=-0.7965
                      LessThanFunction TmaxIni
                        VariableReference XValue: VariableName=[Berry].MetFactors.BUN_TmaxIni_Record
                        Constant: FixedValue=10
                        Constant PreValue: FixedValue=1.6
                        LinearInterpolationFunction TmaxIni
                          XYPairs: X=[0, 1, 10, 20, 30]; Y=[0, 0.1084, 1.084, 2.168, 3.252]
                          VariableReference XValue: VariableName=[Berry].MetFactors.BUN_TmaxIni_Record
                      LessThanFunction RadIni
                        VariableReference XValue: VariableName=[Berry].MetFactors.BUN_RadIni_Record
                        Constant: FixedValue=10
                        Constant PreValue: FixedValue=0.65
                        LinearInterpolationFunction RadIni
                          XYPairs: X=[0, 1, 10, 20, 30]; Y=[0, 0.0101, 0.101, 0.202, 0.303]
                          VariableReference XValue: VariableName=[Berry].MetFactors.BUN_RadIni_Record
                    LessThanFunction CarbonIni
                      VariableReference XValue: VariableName=[Berry].MetFactors.BUN_CarbonIni_Record
                      Constant FirstYear: FixedValue=0.1
                      Constant PreValue: FixedValue=1
                      LinearInterpolationFunction FDMIni
                        VariableReference XValue: VariableName=[Berry].MetFactors.BUN_CarbonIni_Record
                        XYPairs: X=[0, 0.2, 1, 2, -]; Y=[0, 0.8, 1, 1, -]
                  Constant one: FixedValue=1
                Constant Max: FixedValue=2.1
            OnEventFunction BunchesPerVine: SetEvent=FloweringTime; ReSetEvent=Ecodormancy
              Constant PreEventValue: FixedValue=50
              MaximumFunction PostEventValue
                Constant Minimum: FixedValue=1
                MultiplyFunction BunchesPerVineFun
                  VariableReference BunchesPerShoot: VariableName=[Berry].YieldComponent.BunchesPerShoot
                  MultiplyFunction ShootsNum
                    VariableReference StemPopulation: VariableName=[Pear].Structure.MainStemPopn
                    VariableReference Population: VariableName=[Pear].Population
            OnEventFunction BerryNum: SetEvent=FruitSet; ReSetEvent=BudBurst
              Constant PreEventValue: FixedValue=65
              MinimumFunction PostEventValue
                MaximumFunction BerryNumFun
                  MultiplyFunction BerryNumFun
                    AddFunction MetFun
                      Constant Intercept: FixedValue=-67.4
                      LinearInterpolationFunction TmaxFlow
                        XYPairs: X=[0, 1, 10, 20, 30, 40]; Y=[0, 3.4217, 34.217, 68.434, 102.651, 120]
                        VariableReference XValue: VariableName=[Berry].MetFactors.BEN_TmaxFlow
                      LinearInterpolationFunction TminFlow
                        XYPairs: X=[0, 1, 10, 20, 30, 40]; Y=[0, 2.4697, 24.697, 49.394, 74.091, 80]
                        VariableReference XValue: VariableName=[Berry].MetFactors.BEN_TminFlow
                      LinearInterpolationFunction TmaxIni
                        XYPairs: X=[0, 1, 10, 20, 30, 40]; Y=[0, 1.3927, 13.927, 27.854, 41.781, 48]
                        LessThanFunction XValue
                          VariableReference XValue: VariableName=[Berry].MetFactors.BEN_TmaxIni_Record
                          Constant: FixedValue=10
                          Constant GuessValue: FixedValue=20
                          VariableReference TmaxIni1: VariableName=[Berry].MetFactors.BEN_TmaxIni_Record
                    LinearInterpolationFunction FDMFlow
                      VariableReference XValue: VariableName=[Berry].MetFactors.BEN_CarbonFlow
                      XYPairs: X=[0, 0.5, 0.8, 1.5, -]; Y=[0, 0.4, 0.9, 1.02, -]
                    LessThanFunction CarbonIni
                      VariableReference XValue: VariableName=[Berry].MetFactors.BEN_CarbonIni_Record
                      Constant Intercept: FixedValue=0.1
                      Constant PreValue: FixedValue=1
                      LinearInterpolationFunction FDMIni
                        VariableReference XValue: VariableName=[Berry].MetFactors.BEN_CarbonIni_Record
                        XYPairs: X=[0, 0.2, 1, 2, -]; Y=[0, 0.6, 1, 1, -]
                  Constant Minimum: FixedValue=30
                Constant UpperLimit: FixedValue=150
            OnEventFunction BerryMass: SetEvent=FruitMaturation; ReSetEvent=BudBurst
              Constant PreEventValue: FixedValue=2.1
              MinimumFunction PostEventValue
                MaximumFunction BerryMassFun
                  Constant LowerLimit: FixedValue=1
                  MultiplyFunction
                    AddFunction MetFun
                      Constant Intercept: FixedValue=0.92369
                      LinearInterpolationFunction TmaxFlow
                        VariableReference XValue: VariableName=[Berry].MetFactors.BM_TmaxFlow
                        XYPairs: X=[0, 1, 10, 30, -]; Y=[0, 0.0327134, 0.327134, 0.981402, -]
                      LinearInterpolationFunction RadFlow
                        XYPairs: X=[0, 1, 10, 30, -]; Y=[0, 0.0212212, 0.212212, 0.636636, -]
                        VariableReference XValue: VariableName=[Berry].MetFactors.BM_RadFlow
                      LinearInterpolationFunction RainTotFlow
                        XYPairs: X=[0, 1, 100, -, -]; Y=[0, -0.0010101, -0.10101, -, -]
                        VariableReference XValue: VariableName=[Berry].MetFactors.BM_RainTotFlow
                      LinearInterpolationFunction RainTotVer
                        VariableReference XValue: VariableName=[Berry].MetFactors.BM_RainTotVer
                        XYPairs: X=[0, 1, 100, -, -]; Y=[0, 0.0010051, 0.10051, -, -]
                    LinearInterpolationFunction FDMFlow
                      VariableReference XValue: VariableName=[Berry].MetFactors.BM_CarbonFlow
                      XYPairs: X=[0, 0.5, 0.8, 1.5, -]; Y=[0, 0.52, 1, 1, -]
                Constant UpperLimit: FixedValue=3
          MultiplyFunction NumberFunction
            VariableReference StemPopulation: VariableName=[Pear].Structure.MainStemPopn
            VariableReference BunchesPerShoot: VariableName=[Berry].YieldComponent.BunchesPerShoot
            VariableReference BerriesPerBunch: VariableName=[Berry].YieldComponent.BerryNum
          MultiplyFunction SingleBerryFW
            BetaGrowthFunction: tm=33.3; te=59.3
              VariableReference XValue: VariableName=[Berry].ThermalTimeAfterFlowering
              VariableReference Ymax: VariableName=[Berry].YieldComponent.BerryMass
            DivideFunction MeanWaterStress
              AccumulateByNumericPhase fw: StartStageName=3.8; EndStageName=6; ResetStageName=BudBurst; FractionRemovedOnCut=0; FractionRemovedOnHarvest=0; FractionRemovedOnGraze=0; FractionRemovedOnPrune=0
                VariableReference fw: VariableName=[Leaf].Fw
              AccumulateByNumericPhase Time: StartStageName=3.8; EndStageName=6; ResetStageName=BudBurst; FractionRemovedOnCut=0; FractionRemovedOnHarvest=0; FractionRemovedOnGraze=0; FractionRemovedOnPrune=0
                Constant Days: FixedValue=1; Units=days/day
          MultiplyFunction TotalBerryFW
            VariableReference BerryNumber: VariableName=[Berry].NumberFunction
            VariableReference BerryFW: VariableName=[Berry].SingleBerryFW
          MultiplyFunction SingleBerryDW
            BetaGrowthFunction: tm=47.8; te=70
              Constant Ymax: FixedValue=0.6; Units=g
              VariableReference XValue: VariableName=[Berry].ThermalTimeAfterFlowering
          SubtractFunction WaterContent
            Constant: FixedValue=1
            PhaseLookupValue AfterFlowering: Start=FloweringTime; End=FruitSet
              MinimumFunction
                DivideFunction
                  VariableReference BerryDW: VariableName=[Berry].Live.Wt
                  VariableReference TotalBerryFW: VariableName=[Berry].TotalBerryFW
                Constant: FixedValue=0.88
          MultiplyFunction DMDemandFunction
            LessThanFunction
              VariableReference DAWS: VariableName=[Weather].DaysSinceWinterSolstice
              Constant HarvestTime: FixedValue=305
              PhaseLookupValue AfterFruitSet: Start=FloweringTime; End=LeafFall
                MaximumFunction
                  DeltaFunction
                    MultiplyFunction Integral
                      VariableReference BerryNumber: VariableName=[Berry].NumberFunction
                      VariableReference BerryDM: VariableName=[Berry].SingleBerryDW
                  Constant: FixedValue=0; Units=g
              Constant Zero: FixedValue=0
            Constant: FixedValue=1; Units=g
          NutrientPoolFunctions DMDemandPriorityFactors
            Constant Structural: FixedValue=1
            Constant Metabolic: FixedValue=1
            Constant Storage: FixedValue=1
          DivideFunction YieldPerVine
            VariableReference TotalBerryFW: VariableName=[Berry].TotalBerryFW
            VariableReference Population: VariableName=[Pear].Population
            Constant: FixedValue=1000
          PhaseLookup Brix
            PhaseLookupValue BeforeVeraison: Start=FruitSet; End=FruitMaturation
              Constant: FixedValue=5
            PhaseLookupValue AfterVeraison: Start=FruitMaturation; End=Harvest
              LessThanFunction
                VariableReference DAWS: VariableName=[Weather].DaysSinceWinterSolstice
                Constant HarvestTime: FixedValue=305
                MaximumFunction
                  DivideFunction
                    MaximumFunction
                      SubtractFunction
                        Constant: FixedValue=0.944
                        VariableReference WaterContent: VariableName=[Berry].WaterContent
                      Constant zero: FixedValue=0
                    Constant: FixedValue=0.0082
                  Constant min: FixedValue=5
                Constant Zero: FixedValue=0
          PhaseLookup TitratableAcid
            PhaseLookupValue BeforeVeraison: Start=FruitSet; End=FruitMaturation
              Constant: FixedValue=0
            PhaseLookupValue AfterVeraison: Start=FruitMaturation; End=Harvest
              ExponentialFunction TitratableAcid: A=7.866; B=30.345; C=-0.0923
                VariableReference XValue: VariableName=[Berry].ThermalTimeAfterVeraison
          AccumulateFunction ThermalTimeAfterVeraison: StartStageName=FloweringTime; EndStageName=FruitMaturation; ResetStageName=Ecodormancy; FractionRemovedOnCut=0; FractionRemovedOnHarvest=0; FractionRemovedOnGraze=0; FractionRemovedOnPrune=0
            VariableReference ThermalTime: VariableName=[Phenology].ThermalTime
          AccumulateFunction ThermalTimeAfterFlowering: StartStageName=FloweringTime; EndStageName=LeafFall; ResetStageName=Ecodormancy; FractionRemovedOnCut=0; FractionRemovedOnHarvest=0; FractionRemovedOnGraze=0; FractionRemovedOnPrune=0
            VariableReference ThermalTime: VariableName=[Phenology].ThermalTime
          Constant MaxNConcDailyGrowth: FixedValue=0.02; Units=g/g
          Constant MinimumNConc: FixedValue=0.002; Units=g/g
          BiomassRemoval BiomassRemovalDefaults: HarvestFractionLiveToRemove=0; HarvestFractionDeadToRemove=0; HarvestFractionLiveToResidue=0; HarvestFractionDeadToResidue=0
          Constant MaximumPotentialGrainSize: FixedValue=2.5; Units=g fresh or dry
          Constant DMConversionEfficiency: FixedValue=0.98
          Constant RemobilisationCost: FixedValue=0
          Constant CarbonConcentration: FixedValue=0.4
          MultiplyFunction MaintenanceRespirationFunction
            Constant Qm: FixedValue=0.001
            ExponentialFunction TempResponse: A=0; B=1; C=0.045
              SubtractFunction TempDiff
                VariableReference XValue: VariableName=[Weather].MeanT
                Constant RefT: FixedValue=20
          LinearInterpolationFunction MaximumNConc
            XYPairs: X=[0, 100, 150, 177, 335, 336, 366]; Y=[0.01, 0.01, 0.025, 0.015, 0.01, 0.01, 0.01]
            VariableReference XValue: VariableName=[Weather].DaysSinceWinterSolstice
          MultiplyFunction NFillingRate
            LessThanFunction
              VariableReference DAWS: VariableName=[Weather].DaysSinceWinterSolstice
              Constant HarvestTime: FixedValue=305
              PhaseLookupValue AfterFruitSet: Start=BudBurst; End=FloweringTime
                MaximumFunction
                  DeltaFunction
                    MultiplyFunction Integral
                      VariableReference BerryNumber: VariableName=[Berry].NumberFunction
                      VariableReference BerryDM: VariableName=[Berry].SingleBerryDW
                      VariableReference NConc: VariableName=[Berry].MaximumNConc
                  Constant: FixedValue=0; Units=g
              Constant Zero: FixedValue=0
            Constant: FixedValue=1; Units=g
          NutrientPoolFunctions NDemandPriorityFactors: same as Vineyard.Row.Pear.Berry.DMDemandPriorityFactors
        Root: GrowthRespiration=0; MaintenanceRespiration=0
          NutrientPoolFunctions InitialWt
            Constant Structural: FixedValue=100; Units=g/plant
            Constant Metabolic: FixedValue=0
            Constant Storage: FixedValue=0
          NutrientDemandFunctions DMDemands
            MultiplyFunction Structural
              VariableReference wt: VariableName=[Root].Live.StructuralWt
              LinearInterpolationFunction GrowthRate
                XYPairs: X=[0, 61, 122, 153, 192, 275, 310, 366]; Y=[0, 0, 0.01, 0.013545, 0.02102184, 0.01, 0, 0]
                VariableReference XValue: VariableName=[Weather].DaysSinceWinterSolstice
              Constant GrowthCostScale: FixedValue=1.3
            Constant Metabolic: FixedValue=0
            Constant Storage: FixedValue=0
            Constant QStructuralPriority: FixedValue=1.6
            Constant QMetabolicPriority: FixedValue=0
            Constant QStoragePriority: FixedValue=0
          Constant DMConversionEfficiency: FixedValue=0.83
          RootShapeCylinder RootShape
          Constant DMRetranslocationFactor: FixedValue=0.002
          Constant DMReallocationFactor: FixedValue=1
          PhaseLookupValue NitrogenDemandSwitch: Start=Ecodormancy; End=LeafFall
            Constant: FixedValue=1
          Constant MinimumNConc: FixedValue=0.001; Units=g/g
          Constant MaximumNConc: FixedValue=0.02; Units=g/g
          Constant MaximumRootDepth: FixedValue=1000000; Units=mm
          BiomassRemoval BiomassRemovalDefaults: HarvestFractionLiveToRemove=0; HarvestFractionDeadToRemove=0; HarvestFractionLiveToResidue=0; HarvestFractionDeadToResidue=0
          Constant RemobilisationCost: FixedValue=0
          LinearInterpolationFunction NUptakeSWFactor
            XYPairs: X=[0, 1]; Y=[0, 1]
            VariableReference XValue: VariableName=[Root].RWC
          Constant SpecificRootLength: FixedValue=500; Units=m/g
          Constant RootFrontVelocity: FixedValue=20; Units=mm/d
          Constant KNO3: FixedValue=0.02
          Constant KNH4: FixedValue=0.02
          Constant MaxDailyNUptake: FixedValue=5
          Constant CarbonConcentration: FixedValue=0.4
          NutrientDemandFunctions NDemands
            MultiplyFunction Structural
              VariableReference MinNconc: VariableName=[Root].minimumNconc
              VariableReference PotentialDMAllocation: VariableName=[Root].potentialDMAllocation.Structural
            MultiplyFunction Metabolic
              SubtractFunction MetabolicNconc
                VariableReference CritNconc: VariableName=[Root].criticalNConc
                VariableReference MinNconc: VariableName=[Root].minimumNconc
              VariableReference PotentialDMAllocation: VariableName=[Root].potentialDMAllocation.Structural
            StorageNDemandFunction Storage
              VariableReference NitrogenDemandSwitch: VariableName=[Root].nitrogenDemandSwitch
              VariableReference MaxNconc: VariableName=[Root].maximumNconc
            Constant QStructuralPriority: FixedValue=1
            Constant QMetabolicPriority: FixedValue=1
            Constant QStoragePriority: FixedValue=1
          VariableReference CriticalNConc: VariableName=[Root].MinimumNConc
          Constant initialNConcFunction: FixedValue=0.01; Units=g/g
          Constant KLModifier: FixedValue=1
          LessThanFunction MaintenanceRespirationFunction
            VariableReference FirstGrowthSeason: VariableName=[Phenology].FirstGrowthSeason
            Constant CheckValue: FixedValue=0.5
            Constant 0: FixedValue=0
            MultiplyFunction MaintenanceRespirationFunction
              Constant Qm: FixedValue=0.01
              ExponentialFunction TempResponse: A=0; B=1; C=0.045
                SubtractFunction TempDiff
                  VariableReference XValue: VariableName=[Weather].MeanT
                  Constant RefT: FixedValue=20
          LessThanFunction SenescenceRate
            VariableReference FirstGrowthSeason: VariableName=[Phenology].FirstGrowthSeason
            Constant CheckValue: FixedValue=0.5
            Constant 0: FixedValue=0
            MultiplyFunction SenescenceRate
              LinearInterpolationFunction SenescenceRate: same as Vineyard.Row.Pear.StructuralRoot.SenescenceRate.SenescenceRate.SenescenceRate
              DivideFunction
                VariableReference wt: VariableName=[Root].Live.StructuralWt
                Constant Ref: FixedValue=100
        Constant MortalityRate: FixedValue=0
        Constant SeedMortalityRate: FixedValue=0
        OrganArbitrator Arbitrator
          BiomassTypeArbitrator DMArbitration
            Folder PotentialPartitioningMethods
              ReallocationMethod
              AllocateFixationMethod
              RetranslocationMethod
              SendPotentialDMAllocationsMethod
            Folder AllocationMethods
              NutrientConstrainedAllocationMethod
              DryMatterAllocationsMethod
            QPrioritythenRelativeAllocation ArbitrationMethod
          BiomassTypeArbitrator NArbitration
            Folder PotentialPartitioningMethods
              ReallocationMethod
            Folder ActualPartitioningMethods
              AllocateFixationMethod
              RetranslocationMethod
            Folder AllocationMethods
              NitrogenAllocationsMethod
            RelativeAllocation ArbitrationMethod
            AllocateUptakesMethod
          WaterUptakeMethod
          NitrogenUptakeMethod
        CompositeBiomass AboveGround: OrganNames=[Leaf, Shoot, Cane, Trunk, Berry]; IncludeLive=true; IncludeDead=true
        CompositeBiomass BelowGround: OrganNames=[Root, StructuralRoot]; IncludeLive=true; IncludeDead=true
      Fertiliser
      SurfaceOrganicMatter: InitialResidueName=wheat_stubble; InitialResidueType=wheat; InitialResidueMass=10; InitialStandingFraction=0; InitialCPR=0; InitialCNR=7.44
      Irrigation
      Soil: Latitude=39.3614; Longitude=22.093
        LayerStructure: Thickness=[200, 200, 200, 200, 200, 200, 400, 400, 400, 600]
        Physical
          Thickness  ParticleSizeSand  ParticleSizeSilt  ParticleSizeClay  Rocks     BD    AirDry  LL15  DUL   SAT
          200        20                70                10                0         1.16  0.1     0.16  0.36  0.56
          250        20                70                10                0         1.16  0.1     0.16  0.36  0.56
          300        20                70                10                0         1.16  0.15    0.16  0.36  0.56
          150        20                70                10                0.202151  1.16  0.13    0.16  0.36  0.56
          150        20                70                10                0.202151  1.16  0.1     0.16  0.36  0.56
          1950       20                70                10                0.193548  1.16  0.06    0.16  0.36  0.56
          Rocks source: Calculated
          SoilCrop PearSoil: LL=[0.16, 0.16, 0.16, 0.16, 0.16, 0.16]; KL=[0.25, 0.1, 0.08, 0.05, 0.05, 0.01]; XF=[1, 1, 1, 1, 1, 1]
          SoilCrop SlurpSoil: LL=[0.16, 0.16, 0.16, 0.16, 0.16, 0.16]; KL=[0.11, 0.11, 0.02, 0, 0, 0]; XF=[1, 1, 1, 1, 1, 1]
        WaterBalance SoilWater: SummerDate=1-Apr; SummerU=4; SummerCona=1; WinterDate=1-Nov; WinterU=4; WinterCona=1; DiffusConst=88; DiffusSlope=35.4; Salb=0.18; CN2Bare=68; CNRed=20; CNCov=0.8; DischargeWidth=0; CatchmentArea=0; PSIDul=-100
          Thickness  SWCON  KLAT
          150        0.55   0
          150        0.55   0
          100        0.55   0
          200        0.55   0
          200        0.55   0
          200        0.55   0
          200        0.55   0
          200        0.55   0
          200        0.55   0
          200        0.55   0
          200        0.55   0
          200        0.55   0
          400        0.55   0
          400        0.55   0
        Organic: FOMCNRatio=30; CarbonUnits=Total
          Thickness  Carbon  SoilCNRatio  FBiom  FInert  FOM
          100        4.53    7.44         0.025  0.3     1243.93
          200        4.53    7.44         0.025  0.4     833.832
          300        1.2     7.44         0.015  0.75    457.617
          300        1.03    7.44         0.01   0.9     251.145
          300        0.47    7.44         0.01   0.96    137.831
          300        0.47    7.44         0.01   0.96    75.6435
        Chemical: PHUnits=Water
          Thickness  PH  EC     ESP   CEC
          100        7   0.304  0.25  49.67
          200        7   0.304  0.25  49.67
          300        7   0.304  0.25  49.67
          300        7   0.304  0.25  49.67
          300        7   0.304  0.25  49.67
          300        7   0.304  0.25  49.67
        CERESSoilTemperature Temperature
        Water: Thickness=[100, 100, 100, 150, 150, 300]; InitialValues=[0.35, 0.35, 0.35, 0.33, 0.28, 0.1]; InitialPAWmm=82.5; RelativeTo=LL15; FilledFromTop=true
        OutputLayers: Thickness=[150, 150, 150, 150, 150, 150, 150]
        Nutrient
        Solute NO3: Thickness=[100, 200, 300, 300, 300, 300]; InitialValues=[3.1, 2.55, 1, 1, 0, 0]; InitialValuesUnits=ppm; WaterTableConcentration=0; D0=0; DepthConstant=0; MaxDepthSoluteAccessible=0; RunoffEffectivenessAtMovingSolute=0; MaxEffectiveRunoff=0
        Solute NH4: Thickness=[100, 200, 300, 300, 300, 300]; InitialValues=[3, 1.5, 1.2, 1.1, 0, 0]; InitialValuesUnits=ppm; WaterTableConcentration=0; D0=0; DepthConstant=0; MaxDepthSoluteAccessible=0; RunoffEffectivenessAtMovingSolute=0; MaxEffectiveRunoff=0
        Solute Urea: Thickness=[100, 200, 300, 300, 300, 300]; InitialValues=[0, 0, 0, 0, 0, 0]; InitialValuesUnits=kg/ha; WaterTableConcentration=0; D0=0; DepthConstant=0; MaxDepthSoluteAccessible=0; RunoffEffectivenessAtMovingSolute=0; MaxEffectiveRunoff=0
      Manager SoilWaterUpdate
        FilePath = /home/eathanasakis/Intership/MultiAgent_Apsimx/APSIM_FILES/pear_soil_moisture_data.txt
```csharp
using System;
using System.Collections.Generic;
using System.IO;
using System.Linq;
using Models.Core;
using Models.Soils;
using Models.Climate;
using Models.PMF;
using Models;
using APSIM.Shared.Utilities;
using Models.Interfaces;
using System.Globalization; 
using System.Xml.Serialization;


[Serializable]
public class SoilWaterUpdate : Model
{
    [Link] private ISoilWater waterBalance;  // Ensure this links to your soil's water model
    [Link] private Clock Clock;
    [Link] private Summary Summary;

    [Description("Full path to the sensor data CSV file")]
    public string FilePath { get; set; }

    // Store updates as Date -> List of (Layer, SW) pairs
    private Dictionary<DateTime, List<(int Layer, double SW)>> dailySWData = 
        new Dictionary<DateTime, List<(int, double)>>();

    [EventSubscribe("Commencing")]
    private void OnCommencing(object sender, EventArgs e)
    {
        Summary.WriteMessage(this, "LOADING SENSOR DATA", MessageType.Diagnostic);
        if (!File.Exists(FilePath))
            throw new Exception($"File not found: {FilePath}");

        foreach (var line in File.ReadLines(FilePath).Skip(1))
        {
            if (string.IsNullOrWhiteSpace(line)) continue;

            var parts = line.Split(',');
            if (parts.Length < 3) continue;

            if (DateTime.TryParse(parts[0], out DateTime date) &&
                int.TryParse(parts[1], out int layer) &&
                double.TryParse(parts[2], NumberStyles.Any, CultureInfo.InvariantCulture, out double sw))
            {
                if (!dailySWData.ContainsKey(date))
                    dailySWData[date] = new List<(int, double)>();
                
                dailySWData[date].Add((layer, sw));
            }
        }
        Summary.WriteMessage(this, $"First 5 loaded dates: {string.Join(", ", dailySWData.Keys.OrderBy(d => d).Take(5))}", MessageType.Diagnostic);
        Summary.WriteMessage(this, "DATA",MessageType.Diagnostic);
        // Build a string that represents the content of dailySWData:
        string dailyDataText = string.Join(Environment.NewLine, 
        dailySWData.OrderBy(kvp => kvp.Key).Select(kvp => $"{kvp.Key:yyyy-MM-dd}: {string.Join("; ", kvp.Value.Select(update => $"Layer {update.Layer} -> SW {update.SW}"))}"));

        Summary.WriteMessage(this, dailyDataText, MessageType.Diagnostic);
    }

    //[EventSubscribe("DoDailyFinalisation")]  // Update at end of day
    [EventSubscribe("StartOfDay")]
    private void UpdateSoilWater(object sender, EventArgs e)
    {
        DateTime today = Clock.Today;
        if (dailySWData.TryGetValue(today, out var updates))
        {
            foreach (var (layer, sw) in updates)
            {
                if (layer >= 0 && layer < waterBalance.SWmm.Length)
                {
                    Summary.WriteMessage(this, $"BEFORE VALUE: {waterBalance.SWmm[layer]}",MessageType.Diagnostic);
                    waterBalance.SWmm[layer] = sw;  // Update current soil water
                    Summary.WriteMessage(this, 
                        $"Updated layer {layer} SW to {sw} on {today:yyyy-MM-dd}", 
                        MessageType.Diagnostic);
                }
            }
        }
    }
}
```
      Manager Automatic irrigation based on water deficit
        Crop = [Pear]
        AutoIrrigationOn = True
        FASWThreshold = 0.9
        FASWDepth = 600
        weeks = 0
        afterSowing = 2
```csharp
using Models.Interfaces;
using System;
using System.Linq;
using Models.Core;
using System.Collections.Generic;
using System.Text;
using Models.Soils;
using Models.PMF;
using Models;
using System.Xml.Serialization;
using APSIM.Shared.Utilities;
using Models.Interfaces;
namespace Models
{
    [Serializable] 
    public class Script : Model
    {
        [Link] private Zone zone;
        [Link] private Irrigation irrigation;
        [Link] private ISoilWater waterBalance;
        [Link] private IPhysical soilPhysical;
        public double FASW { get; set; }
        public double WaterDeficit  { get; set; }
    


        [Description("Crop to irrigate")]
        public IPlant Crop { get; set; }
        
        [Description("Auto irrigation on?")]
        public bool AutoIrrigationOn { get; set; }

        [Description("Threshold fraction available water (0-1)")]
        public double FASWThreshold { get; set; }

        [Description("Soil depth (mm) to which fraction available water is calculated")]
        public double FASWDepth { get; set; }

        [Description("Minimum weeks between irrigations")]
        public double weeks { get; set; }

        [Description("Minimum days after sowing for first irrigation")]
        public int afterSowing { get; set; }

        private double irrigationGap = 0;    // gap between irrigations

        /// <summary>Called at start of simulation. Performs some basic error checking. </summary>
        [EventSubscribe("StartOfSimulation")]
        private void ErrorChecking(object sender, EventArgs args)
        {
            if (Crop == null)
                throw new Exception("No crop was specified in script " + Parent.Name);
        }

        [EventSubscribe("DoManagement")]
        private void OnDoManagement(object sender, EventArgs e)
        {
            if (AutoIrrigationOn && Crop.IsAlive)
            {
                   irrigationGap += 1;                // increment gap between irrigations
                CalculateFASW();                // calc FASW and WaterDeficit
                if ((FASW < FASWThreshold) && (irrigationGap >= weeks * 7))
                {
                    irrigation.Apply(WaterDeficit, depth: 0);
                    irrigationGap = 0;            // reset
                }
            }
            else
            {
                irrigationGap = weeks * 7 - afterSowing - 1;    // allow irrigation a number of days after it becomes alive/sown
            }
        }

        // Calculate the fraction of the potential available sw
        // Calculate the deficit amount from DUL
        private void CalculateFASW()
        {
            double[] LL15 = MathUtilities.Multiply(soilPhysical.LL15, soilPhysical.Thickness);
            double[] DUL = MathUtilities.Multiply(soilPhysical.DUL, soilPhysical.Thickness);
        
            int nlayr = GetLayerIndex(FASWDepth);
            nlayr = Math.Min(nlayr, soilPhysical.Thickness.Length-1);
            double cumdep = MathUtilities.Sum(soilPhysical.Thickness, 0, nlayr, 0.0);    // tricky function that sums up to before nlayr

            double part_layer = MathUtilities.Divide((FASWDepth - cumdep), soilPhysical.Thickness[nlayr], 0.0);

            // note that results may be strange if swdep < ll15
            double avail_sw = (MathUtilities.Sum(waterBalance.SWmm, 0, nlayr, 0.0) + part_layer * waterBalance.SWmm[nlayr])
                            - (MathUtilities.Sum(LL15, 0, nlayr, 0.0) + part_layer * LL15[nlayr]);

            double pot_avail_sw = (MathUtilities.Sum(DUL, 0, nlayr, 0.0) + part_layer * DUL[nlayr])
                                - (MathUtilities.Sum(LL15, 0, nlayr, 0.0) + part_layer * LL15[nlayr]);
            
            FASW = MathUtilities.Divide(avail_sw, pot_avail_sw, 0.0);
            WaterDeficit = MathUtilities.Constrain(pot_avail_sw - avail_sw, 0.0, 100000);
        }

        // Get index of the layer that has this depth in it 
        private int GetLayerIndex(double pointDepth)
        {
            double[] cumThickness = soilPhysical.ThicknessCumulative;
            int layerIdx = 0;
            while ((layerIdx < cumThickness.Length) && (pointDepth > cumThickness[layerIdx]))
            {
                layerIdx += 1;
            }

            return layerIdx;
        }
    }
}
```
      Manager SetupTreeRootZones
        UseExtraZone = True
```csharp
using Models.Soils;
using Models.Functions;
using APSIM.Shared.Utilities;
using System.Xml.Serialization;
using Models;
using Models.PMF;
using System.Text;
using System.Collections.Generic;
using Models.Core;
using System;
using Models.PMF.Organs;

namespace Models
{
    [Serializable] 
    public class Script : Model
    {
        [Link] private Plant Pear;
        [Link] private Clock Clock;
        [Link] private Zone zone;
        [Link(Type = LinkType.Path, Path = "[Pear].Root")]
        private Root root;

        [Description("Use extra root zone")]
        public bool UseExtraZone { get; set; }

        
        [EventSubscribe("StartOfSimulation")]
        private void OnSimulationCommencing(object sender, EventArgs e)
        {
            if (UseExtraZone)
            {
            root.ZoneNamesToGrowRootsIn.Add("Alley");
            root.ZoneRootDepths.Add(2600);
            NutrientPoolFunctions InitialDM = new NutrientPoolFunctions();
            Constant InitStruct = new Constant();
            InitStruct.FixedValue = 10;
            InitialDM.Structural = InitStruct;
            Constant InitMetab = new Constant();
            InitMetab.FixedValue = 0;
            InitialDM.Metabolic = InitMetab;
            Constant InitStor = new Constant();
            InitStor.FixedValue = 0;
            InitialDM.Storage = InitStor;
            root.ZoneInitialDM.Add(InitialDM);

            }
        }
    }
}
```
      Manager PlantVariables
```csharp
using Models.Climate;
using System;
using Models.Core;
using Models.PMF;
using System.Collections.Generic;
using Models.Soils;
using APSIM.Shared.Utilities;
using Models.Zones;
using Models.PMF.Organs;

namespace Models
{
    [Serializable]
    public class Script : Model
    {
        [Link] private Weather weather;
        [Link(Type = LinkType.Path, Path = "[Pear].Root")]
        private Root root;
        private RectangularZone AlleyZone {get; set; }
        private RectangularZone RowZone {get; set;}
        private RectangularZone ThisZone {get; set;}
        private double AreaWidth {get; set;}

        public double FRadInt {get; set;}
        public double ET {get; set;}
        public double ES {get; set;}
        public double PET {get; set;}
        public double LAI {get; set;}
        public double Height {get; set;}
        public double RootDepth {get; set;}
        public double PlantWidth {get; set;}

        [EventSubscribe("StartOfSimulation")]
        private void DoStartOfSimulation(object sender, EventArgs e)
        {
               
               ThisZone = this.Parent.Parent as RectangularZone;
               RowZone = this.Parent.Parent.Parent.FindInScope("Row") as RectangularZone;
               AlleyZone = (RectangularZone)this.Parent.Parent.Parent.FindInScope("Alley") as RectangularZone;
               AreaWidth = AlleyZone.Width + RowZone.Width;
               PlantWidth = 0;
        }
        
        [EventSubscribe("DoReportCalculations")]
        private void OnDoReportCalculations(object sender, EventArgs e)
        {
            if (ThisZone.Name == "Row")
                {
                FRadInt = ((double)RowZone.Get("Pear.Leaf.RadiationIntercepted") * RowZone.Width)/(weather.Radn * AreaWidth);
                ET = (double)RowZone.Get("Pear.Leaf.Transpiration") * RowZone.Width/AreaWidth;
                LAI = (double)RowZone.Get("Pear.Leaf.LAI");
                //LAIPerVine =  LAI*RowZone.Width*1.8;
                //TreeInitialisation.Script.VineDistance;
                //(double)RowZone.Get("Pear.Leaf.LAI");
                Height = (double)RowZone.Get("Pear.Leaf.Height");
                RootDepth = (double)RowZone.Get("Pear.Root.Depth");
                PlantWidth = (double)RowZone.Get("Pear.Leaf.Width");
                }
            else
                {
                FRadInt = ((double)AlleyZone.Get("Slurp.Leaf.RadiationIntercepted") * ThisZone.Width)/ (weather.Radn * AreaWidth);
                ET = (double)AlleyZone.Get("Slurp.Leaf.Transpiration") * ThisZone.Width/AreaWidth;
                LAI = (double)AlleyZone.Get("Slurp.Leaf.LAI");
                Height = (double)AlleyZone.Get("Slurp.Leaf.Height");
                RootDepth = (double)AlleyZone.Get("Slurp.Root.Depth");
                }

            ES = (double)ThisZone.Get("Soil.SoilWater.Es") * ThisZone.Width/AreaWidth;
            double PETWidth = Math.Min(Math.Max(PlantWidth,ThisZone.Width),AreaWidth);
            PET = (double)ThisZone.Get("Soil.SoilWater.Eo") * PETWidth/AreaWidth;
        }
    }
}
```
      Manager HarvestNPruning
        phenology = [Phenology]
        LeafPluckingDAWS = 205
        HarvestDAWS = 290
        PruningDAWS = 314
        FrostDate1 = 10/03/2002 00:00:00
        FrostDate2 = 11/18/2002 00:00:00
```csharp
using Models.PMF.Interfaces;
using Newtonsoft.Json;
using Models.PMF.Struct;
using Models.Climate;
using System;
using System.Collections.Generic;
using Models.Core;
using Models.PMF;
using Models.PMF.Interfaces;
using System.Xml.Serialization;
using Models.PMF.Organs;
using Models.PMF.Phen;
using Models.Soils;

namespace Models
{
    [Serializable] 
    [System.Xml.Serialization.XmlInclude(typeof(Model))]
    public class Script : Model
    {
        [Link] private Plant Pear;
        [Link] private Clock Clock;
        [Link] private Zone zone;
        [Link] private Weather weather;
        [Link]
        private Root root;
        [Link(Type = LinkType.Path, Path = "[Pear].Structure")]
        private Structure structure;
        
        //[Link(Type = LinkType.Path, Path = "[Pear].Phenology")]
        [Description("Phenology")]
        public Phenology phenology {get; set;}
       
           public event EventHandler LeafPlucking;
           public event EventHandler Pruning;
       
        [Description("SummerPruning_DAWS")]         
        public int LeafPluckingDAWS { get; set; }  //day

        [Description("Harvest_DAWS")]
        public int HarvestDAWS { get; set; }

        [Description("Pruning_DAWS")]         
        public int PruningDAWS { get; set; }  //day

        [Description("Frost Date 1")]
        public DateTime FrostDate1 { get; set; }
        [Description("Frost Date 2")]
        public DateTime FrostDate2 { get; set; }


        [EventSubscribe("StartOfSimulation")]
        private void OnSimulationCommencing(object sender, EventArgs e)
        {
        }
        
        [EventSubscribe("DoManagement")]
        private void OnDoManagement(object sender, EventArgs e)
        {
             var Leaf = Pear.FindChild<IHasDamageableBiomass>("Leaf");
             var Shoot = Pear.FindChild<IHasDamageableBiomass>("Shoot");
             var Cane = Pear.FindChild<IHasDamageableBiomass>("Cane");
             var Trunk = Pear.FindChild<IHasDamageableBiomass>("Trunk");
             var Root = Pear.FindChild<IHasDamageableBiomass>("Root");
             var StructuralRoot = Pear.FindChild<IHasDamageableBiomass>("StructuralRoot");
             var Berry = Pear.FindChild<IHasDamageableBiomass>("Berry");
             
             //Set up  array of remove fractions to send with Cut method.  Each member in the array corresponds to an organ in the same order they are set up in.
             //PruneDate = DateTime.Parse(PruneDateString);
             if (weather.DaysSinceWinterSolstice == LeafPluckingDAWS && phenology.Stage >= 3)
             {
                    
                //int LeafTipsAppeared = (int)structure.LeafTipsAppeared;
                //int NodesToRemove = (int)Math.Max(LeafTipsAppeared - TargetLeafRank, 1); 
                double FractionToRemove = 0.3; //1- TargetLeafRank/LeafTipsAppeared;
            
               // Remove_1.NodesToRemove = NodesToRemove;
                LeafPlucking?.Invoke(this, EventArgs.Empty);
                Leaf.RemoveBiomass(liveToRemove: 0, deadToRemove: 0.0, liveToResidue: FractionToRemove, deadToResidue: 0.0);
                Shoot.RemoveBiomass(liveToRemove: 0, deadToRemove: 0.0, liveToResidue: FractionToRemove, deadToResidue: 0.0);
                Cane.RemoveBiomass(liveToRemove: 0, deadToRemove: 0.0, liveToResidue: 0, deadToResidue: 0.0);
                Trunk.RemoveBiomass(liveToRemove: 0, deadToRemove: 0.0, liveToResidue: 0, deadToResidue: 0.0);
                Root.RemoveBiomass(liveToRemove: 0, deadToRemove: 0.0, liveToResidue: 0, deadToResidue: 0.0);
                StructuralRoot.RemoveBiomass(liveToRemove: 0, deadToRemove: 0.0, liveToResidue: 0.0, deadToResidue: 0.0);
                Berry.RemoveBiomass(liveToRemove: 0, deadToRemove: 0.0, liveToResidue: 0, deadToResidue: 0.0);
                
             }

           if (weather.DaysSinceWinterSolstice == HarvestDAWS && phenology.Stage >= 3)
           {
               LeafPlucking?.Invoke(this, EventArgs.Empty);
               Leaf.RemoveBiomass(liveToRemove: 0, deadToRemove: 0.0, liveToResidue: 0.2, deadToResidue: 0.0);
               Shoot.RemoveBiomass(liveToRemove: 0, deadToRemove: 0.0, liveToResidue: 0, deadToResidue: 0.0);
               Cane.RemoveBiomass(liveToRemove: 0, deadToRemove: 0.0, liveToResidue: 0, deadToResidue: 0.0);
               Trunk.RemoveBiomass(liveToRemove: 0, deadToRemove: 0.0, liveToResidue: 0, deadToResidue: 0.0);
               Root.RemoveBiomass(liveToRemove: 0, deadToRemove: 0.0, liveToResidue: 0, deadToResidue: 0.0);
               StructuralRoot.RemoveBiomass(liveToRemove: 0, deadToRemove: 0.0, liveToResidue: 0.0, deadToResidue: 0.0);
               Berry.RemoveBiomass(liveToRemove: 1, deadToRemove: 0.0, liveToResidue: 0, deadToResidue: 0.0);
           }
                                   
           if (weather.DaysSinceWinterSolstice == PruningDAWS&& phenology.Stage >= 3)
           {
               Pear.Phenology?.SetToStage(1);
               Pruning?.Invoke(this, EventArgs.Empty);
               Leaf.RemoveBiomass(liveToRemove: 0, deadToRemove: 0.0, liveToResidue: 1.0, deadToResidue: 0.0);
               Shoot.RemoveBiomass(liveToRemove: 0, deadToRemove: 0.0, liveToResidue: 1.0, deadToResidue: 0.0);
               Cane.RemoveBiomass(liveToRemove: 0, deadToRemove: 0.0, liveToResidue: 1.0, deadToResidue: 0.0);
               Trunk.RemoveBiomass(liveToRemove: 0, deadToRemove: 0.0, liveToResidue: 0, deadToResidue: 0.0);
               Root.RemoveBiomass(liveToRemove: 0, deadToRemove: 0.0, liveToResidue: 0, deadToResidue: 0.0);
               StructuralRoot.RemoveBiomass(liveToRemove: 0, deadToRemove: 0.0, liveToResidue: 0.0, deadToResidue: 0.0);
               Berry.RemoveBiomass(liveToRemove: 0, deadToRemove: 0.0, liveToResidue: 1.0, deadToResidue: 0.0);

               double caneBiomass = 96.9; //g/m2 reset the cane biomass to the original value 
               double caneNSC = caneBiomass * 0.18;

               zone.Set("[Pear].Cane.Live.StorageWt", caneNSC);                
               zone.Set("[Pear].Cane.Live.StructuralWt", caneBiomass - caneNSC); 

                //zone.Set("[Pear].Trunk.Live.StructuralWt", 280);     
               // zone.Set("[Pear].Trunk.Live.StorageWt", 70);     

               // zone.Set("[Pear].Root.Live.StructuralWt", 1531);     
               // zone.Set("[Pear].Root.Live.StorageWt",  349);     

            }
           if (Clock.Today.Date == FrostDate1)      
           {
              LeafPlucking?.Invoke(this, EventArgs.Empty);
              Leaf.RemoveBiomass(liveToRemove: 0, deadToRemove: 0.0, liveToResidue: 0.2, deadToResidue: 0.0);
              zone.Set("[Pear].Structure.FinalLeafNumber.FixedValue", 28); 
           }  

           if (Clock.Today.Date == FrostDate2)      
           {
              LeafPlucking?.Invoke(this, EventArgs.Empty);
              Leaf.RemoveBiomass(liveToRemove: 0, deadToRemove: 0.0, liveToResidue: 0.2, deadToResidue: 0.0);
           }  

        }
    }
}
```
      Manager Fertilise on fixed dates
        FertiliserType = NH4NO3N
        FertiliserDates = 1-Nov, 1-Feb
        Amount = 15
        AmountType = True
        script: same as in Replacements.Fertilise on fixed dates
      Manager Reset on date
        ResetDate = 10-Jul
        ResetWater = Yes
        ResetNutrients = Yes
        ResetSOM = Yes
```csharp
using APSIM.Shared.Utilities;
using Models.Surface;
using Models.Utilities;
using Models.Soils.Nutrients;
using Models.Soils;
using Models.PMF;
using Models.Core;
using System;
using Models.Interfaces;
using System.Diagnostics;

namespace Models
{
    [Serializable]
    public class Script : Model
    {
        [Link] private Clock Clock;
        [Link] private Plant Wheat;
        [Link] private ISoilWater SoilWater;
        [Link] private Nutrient nitrogen;
        [Link] private SurfaceOrganicMatter SOM;
        [Link] private Summary Summary;

        [Description("Date to reset on:")]
        public string ResetDate {get;set;}

        [Description("Reset Water? (Yes or No)")]
        public string ResetWater {get;set;}

        [Description("Reset Soil Nutrients ? (Yes or No)")]
        public string ResetNutrients {get;set;}

        [Description("Reset Surface Organic Matter? (Yes or No)")]
        public string ResetSOM {get;set;}

        [EventSubscribe("DoManagement")]
        private void OnDoManagement(object sender, EventArgs e)
        {
            Debugger.Break();
            if (DateUtilities.WithinDates(ResetDate, Clock.Today, ResetDate))
            {
                if (ResetWater == "Yes")
                {
                    Summary.WriteMessage(this, "Reset Water", MessageType.Diagnostic);
                    SoilWater.Reset();
                }
               
                 if (ResetNutrients == "Yes")
                {
                    Summary.WriteMessage(this, "Reset Nitrogen", MessageType.Diagnostic);
                    nitrogen.Reset();
                }

                if (ResetSOM == "Yes")
                {
                    Summary.WriteMessage(this, "Reset Surface OM", MessageType.Diagnostic);
                    SOM.Reset();
                }
            }
        }
    }
}
```
      Report: EventNames=[Clock].DoReport
        VariableNames:
          [Clock].Today
          [Clock].Today.Year
          [Clock].Today.DayOfYear
          [Weather].DaysSinceWinterSolstice   as DAWS
          [PlantVariables].Script.Height 		as height
          [PlantVariables].Script.LAI         as lai
          [PlantVariables].Script.FRadInt     as f.rad.int
          [PlantVariables].Script.ET          as transpiration
          [PlantVariables].Script.ES          as Es
          [PlantVariables].Script.PET         as PET
          [PlantVariables].Script.RootDepth   as rootDepth
          [Soil].OutputLayers.SW
          sum([Soil].OutputLayers.SWmm)       as psw
          [Weather].Rain
          [Irrigation].IrrigationApplied      as waterApplied
          [Soil].SoilWater.Drainage
          [Pear].Structure.PrimaryBudNo
          [Pear].Structure.MainStemPopn
          [Pear].Structure.LeafTipsAppeared
          [Pear].Structure.TotalLeavesPerShoot as leaf.no.shoot
          [Pear].Leaf.InitialisedCohortNo
          [Pear].Leaf.DeadCohortNo
          [Pear].Leaf.AppearedCohortNo
          [Pear].Leaf.CohortSize
          [Pear].Leaf.LAI as LAI
          [Pear].Leaf.LAI/([Pear].Population + 0.0000001)            as leaf.area.vine
          [Pear].Leaf.LAI/([Pear].Structure.MainStemPopn + 0.0000001) as leaf.area.shoot
          [Pear].Leaf.LAIMainStem/([Pear].Structure.MainStemPopn + 0.0000001) as leaf.area.shoot.main
          [Pear].Leaf.LAIBranch/([Pear].Structure.MainStemPopn + 0.0000001) as leaf.area.shoot.lateral
          [Pear].Leaf.Fn
          [Pear].Leaf.Fw
          [Pear].Leaf.Live.Wt
          [Pear].Leaf.Live.Wt/([Pear].Structure.MainStemPopn + 0.0000001) as leaf.dw.shoot
          [Pear].Shoot.Live.Wt
          [Pear].Shoot.Live.Wt/([Pear].Structure.MainStemPopn + 0.0000001) as shoot.dw
          [Pear].Shoot.Live.StructuralWt
          [Pear].Shoot.Live.StorageWt
          [Pear].Cane.Live.Wt
          [Pear].Cane.Live.StructuralWt
          [Pear].Cane.Live.StorageWt
          [Pear].Trunk.Live.Wt
          [Pear].Trunk.Live.StructuralWt
          [Pear].Trunk.Live.StorageWt
          [Pear].Trunk.Live.StorageWt/([Pear].Trunk.Live.Wt + 0.0000001) as total.NSC.concentration.trunk
          [Pear].Root.Live.Wt
          [Pear].StructuralRoot.Live.Wt
          [Pear].StructuralRoot.Live.StructuralWt
          [Pear].StructuralRoot.Live.StorageWt
          [Pear].StructuralRoot.Live.StorageWt/([Pear].StructuralRoot.Live.Wt + 0.0000001) as total.NSC.concentration.root
          [Pear].Arbitrator.FDM
          [Pear].Arbitrator.DM.TotalFixationSupply
          [Pear].Berry.Live.Wt
          [Pear].Berry.SingleBerryDW
          [Pear].Berry.SingleBerryFW     as berry.fw.mean
          [Pear].Berry.TotalBerryFW      as total_yield
          [Pear].Berry.NumberFunction
          [Pear].Berry.ThermalTimeAfterFlowering
          [Pear].Berry.WaterContent
          [Pear].Berry.Brix 				as brix
          [Pear].Berry.TitratableAcid 	as ta
          [Pear].Berry.MetFactors.BUN_TmaxIni_Record    as BUN_TmaxIni
          [Pear].Berry.MetFactors.BUN_RadIni_Record     as BUN_RadIni
          [Pear].Berry.MetFactors.BEN_RainTotFlow as BEN_RainTotFlow
          [Pear].Berry.MetFactors.BEN_TmaxIni_Record    as BEN_TmaxIni_Record
          [Pear].Berry.MetFactors.BEN_TmeanFlow   as BEN_TmeanFlow
          [Pear].Berry.MetFactors.BM_RadFlow      as BM_RadFlow
          [Pear].Berry.MetFactors.BM_RainTotFlow  as BM_RainTotFlow
          [Pear].Berry.MetFactors.BM_RainTotVer   as BM_RainTotVer
          [Pear].Berry.MetFactors.BM_TmeanFlow    as BM_TmeanFlow
          [Pear].Berry.YieldComponent.BunchesPerShoot as bunch.no.shoot
          [Pear].Berry.YieldComponent.BunchesPerVine  as bunch.no.vine
          [Pear].Berry.YieldComponent.BerryNum    as BerryNum
          [Pear].Berry.YieldComponent.BerryMass   as berry.fw.est
          [Pear].Berry.YieldPerVine               as yield.per.vine
          [Pear].Grain.Wt*10 as PearYieldkgha
          [Pear].Grain.Wt*10 as PearYieldkgha
      Manager TreeInitialisation
        CultivarName = Williams
        SowingDate = 03/04/2025 00:00:00
        VineDistance = 1.8
        BudNumber = 25
        CaneNumber = 4
        CaneDiameter = 40
        CaneLength = 1.2
        TrunkDiameter = 150
        TrunkLength = 1.2
        RootTrunkRatio = 1.8
        RootNSC = 0.28
        TrunkNSC = 0.18
        CaneNSC = 0.2
        StartAge = 1
```csharp
using Models.PMF.Phen;
using Models.Zones;
using Models.Soils;
using APSIM.Shared.Utilities;
using Models.PMF;
using Models.Core;
using System;
using Models.PMF.Struct;
        
namespace Models
{
    [Serializable] 
    [System.Xml.Serialization.XmlInclude(typeof(Model))]
    public class Script : Model
    {
        [Link] private Plant Pear;
        [Link] private Clock Clock;
        [Link] private Soil Soil;
        [Link] private Zone zone;
        [Link]
        private Structure structure;
        [Link]
        private Phenology phenology;

        [Display(Type = DisplayType.CultivarName)]
        [Description("Plant Type")]
        public string CultivarName { get; set; }

        [Description("Initialisation Date")]
        public DateTime SowingDate { get; set; }

        [Description("Vine distance(m)")]
        public double VineDistance { get; set; }
        //number of buds lay down in cane and spur. there is a function inside to calculate the number of buds per vine based on bud burst and from cane head
        [Description("Bud number(#)")]
        public double BudNumber { get; set; }
        //cane or spur biomass
        [Description("Cane number(#)")]
        public double CaneNumber { get; set; }
      
        [Description("Cane diameter(mm)")]
        public double CaneDiameter { get; set; }

        [Description("Cane length(m)")]
        public double CaneLength { get; set; }
        //trunk information
        [Description("Trunk diameter(mm)")]
        public double TrunkDiameter { get; set; }

        [Description("Trunk length(m)")]
        public double TrunkLength { get; set; }
        //root dry matter
        [Description("Fibrous root trunk ratio")]
        public double RootTrunkRatio { get; set; }
             
        //total nonstructural fraction in dry matter 
        [Description("Fibrous root nonstructural carbon fraction")]
        public double RootNSC { get; set; }

        [Description("Trunk nonstructural carbon fraction")]
        public double TrunkNSC { get; set; }

        [Description("Cane nonstructural carbon fraction")]
        public double CaneNSC { get; set; }

        [Description("Age of trees (in Years) at start of simulation)")]
        public int StartAge {get;set;}

        private RectangularZone RowZone {get; set;}

        [EventSubscribe("DoManagement")]
        private void OnDoManagement(object sender, EventArgs e)
        {
            if (Clock.Today.Date == SowingDate)
            {
                RowZone = this.Parent.Parent.Parent.FindInScope("Row") as RectangularZone;
                double pop = 1/RowZone.Width/VineDistance;  
                //sowing method
                Pear.Sow(cultivar: CultivarName,population: pop, 
                depth: 2000, rowSpacing: RowZone.Width, budNumber:BudNumber);
                double budsPerMeterRow = BudNumber/VineDistance; 
                zone.Set("[Pear].Structure.BudsPerMeterRow.FixedValue", budsPerMeterRow); 
                //cane biomass
                //calculate the biomass by length 1 meter time number of canes time wood density (0.5 g/mm2/m) * pop to covert the biomass into g/m2
                double woodDensity = 0.4; //g/mm2/m
                double CaneNumber = BudNumber/12; //recalculating cane number as we 
                double caneBiomass = 3.1415926*(CaneDiameter/2)*(CaneDiameter/2)*CaneLength*CaneNumber *woodDensity * pop; 
                double caneNSC = caneBiomass * CaneNSC;
                zone.Set("[Pear].Cane.CaneDiameter.FixedValue", CaneDiameter);
                zone.Set("[Pear].Cane.CaneLength.FixedValue", CaneLength);
                zone.Set("[Pear].Cane.CaneNumber.FixedValue", CaneNumber);

                zone.Set("[Pear].Cane.Live.StorageWt", caneNSC);                
                zone.Set("[Pear].Cane.Live.StructuralWt", caneBiomass - caneNSC);                

                //trunk biomass
                double trunkDensity = 0.5; //g/mm2/m
                double trunkBiomass = 3.1415926*(TrunkDiameter/2)*(TrunkDiameter/2)*TrunkLength *trunkDensity * pop; 
                double trunkNSC = trunkBiomass * TrunkNSC;

                zone.Set("[Pear].Trunk.TrunkDiameter.FixedValue", TrunkDiameter);
                zone.Set("[Pear].Trunk.TrunkLength.FixedValue", TrunkLength);

                zone.Set("[Pear].Trunk.Live.StorageWt", trunkNSC); 
                zone.Set("[Pear].Trunk.Live.StructuralWt", trunkBiomass - trunkNSC);              
                

                //Fibrous Root biomass is  per plant
                double rootBiomass = RootTrunkRatio * trunkBiomass; 
                double rootNSC = rootBiomass * RootNSC; 
                // zone.Set("[Pear].StructuralRoot.DMDemands.Structural.RootTrunkRatio",  RootTrunkRatio); 
                
                 zone.Set("[Pear].StructuralRoot.Live.StorageWt",    rootNSC ); //rootNSC*pop
                 zone.Set("[Pear].StructuralRoot.Live.StructuralWt", rootBiomass - rootNSC); 

                object StartAgeValue = StartAge;
                zone.Set("[Pear].Phenology.Age.Years",StartAgeValue);


            }
        }
    }
}
```
    RectangularZone Alley: Length=100; Width=1.5; Slope=0; AspectAngle=0; Altitude=105
      Report ReportAlley: EventNames=[Clock].DoReport
        VariableNames:
          [Clock].Today
          [Clock].Today.Year
          [Clock].Today.DayOfYear
          [Weather].DaysSinceWinterSolstice   as DAWS
          [PlantVariables].Script.Height 		as height
          [PlantVariables].Script.LAI         as lai
          [PlantVariables].Script.FRadInt     as f.rad.int
          [PlantVariables].Script.ET          as transpiration
          [PlantVariables].Script.ES          as Es
          [PlantVariables].Script.PET         as PET
          [PlantVariables].Script.RootDepth   as rootDepth
          [Soil].OutputLayers.SW
          sum([Soil].OutputLayers.SWmm)       as psw
          [Weather].Rain
          [Irrigation].IrrigationApplied      as waterApplied
          [Soil].SoilWater.Drainage
      SurfaceOrganicMatter: InitialResidueName=wheat_stubble; InitialResidueType=wheat; InitialResidueMass=10; InitialStandingFraction=0; InitialCPR=0; InitialCNR=7.44
      Plant Slurp
      Fertiliser
      Irrigation
      Manager PastureInitialisation
        CultivarName = StaticCrop
        InitialRootDepth = 2000
        SowingDate = 02/25/2005 00:00:00
        RootDepth = 2000
        RFV = 10
        KLReductionFactor = -0.001
        KLReductionDepth = 150
        MaxG = 0.004
        R50 = 150
```csharp
using Models.Interfaces;
using Models.PMF.Organs;
using System;
using Models.Core;
using Models.PMF;
using APSIM.Shared.Utilities;
using Models.Soils;
        
namespace Models
{
    [Serializable] 
    [System.Xml.Serialization.XmlInclude(typeof(Model))]
    public class Script : Model
    {
        [Link] private Plant Slurp;
        [Link] private Clock Clock;
        [Link] private Soil Soil;
        [Link] private Zone zone;
        [Link(Type = LinkType.Path, Path = "[Slurp].Root")]
        private Root root;
        [Link]
        private IPhysical soilPhysical;

        [Display(Type = DisplayType.CultivarName)]
        [Description("Plant Type")]
        public string CultivarName { get; set; }
        [Description("Initial Root Depth")]
        public double InitialRootDepth { get; set; }
        [Description("Initialisation Date")]
        public DateTime SowingDate { get; set; }
        [Description("Maximum Root Depth")]
        public double RootDepth { get; set; }
        [Description("Roof Front Velocity")]
        public double RFV { get; set; }
        [Description("Factor to change Kl modifier with Depth")]
        public double KLReductionFactor { get; set; }
        [Description("Depth that KL starts to decline")]
        public double KLReductionDepth { get; set; }
        
        public double[] YKLModifiers { get; set; }
        public double[] XDepth { get; set; }
        private double Depth { get; set; }
        
        [Description("Maximum Stomatal Conductance")]
        public double MaxG { get; set; }
        [Description("Stomatal Radn response")]
        public double R50 { get; set; }
        
        [EventSubscribe("DoManagement")]
        private void OnDoManagement(object sender, EventArgs e)
        {
            if (Clock.Today.Date == SowingDate)
            {
                Slurp.Sow(cultivar: CultivarName, population: 1, depth: InitialRootDepth, rowSpacing: 150);
                
                YKLModifiers = new double[soilPhysical.Thickness.Length];
                XDepth = new double[soilPhysical.Thickness.Length];
                Depth = 0;
                for (int layer = 0; layer < soilPhysical.Thickness.Length; layer++)
                {
                    Depth += soilPhysical.Thickness[layer] / 2;  //Add half of the thickness of the current layer so depth is the mid depth of that layer
                    if (Depth <= KLReductionDepth)
                    {
                        YKLModifiers[layer] = 1;
                        XDepth[layer] = Depth;
                    }
                    else
                    {
                        double KLMod = 1 * Math.Exp(-KLReductionFactor * (Depth - KLReductionDepth));
                        YKLModifiers[layer] = KLMod;
                        XDepth[layer] = Depth;
                    }
                    Depth += soilPhysical.Thickness[layer] / 2;  //Add the other half of the current layer so depth is the top of the next layer
                }
                object KLMods = YKLModifiers;
                zone.Set("Slurp.Root.KLModifier.XYPairs.Y", KLMods);
                object Depths = XDepth;
                zone.Set("Slurp.Root.KLModifier.XYPairs.X", Depths);
                object RD = RootDepth;
                zone.Set("Slurp.Root.MaximumRootDepth.FixedValue", RD);
                object RV = RFV;
                zone.Set("Slurp.Root.RootFrontVelocity.Potential.FixedValue", RV);
                object GMaxValue = MaxG;
                zone.Set("Slurp.Leaf.Gsmax350", GMaxValue); 
                object R50Value = R50; 
                zone.Set("Slurp.Leaf.R50", R50Value); 
                
            }
        }
    }
}
```
      Manager SetPastureVariables
        Ext_coef = 0.6
        MaximumHeight = 300
        MinimumHeight = 100
```csharp
using Models.Soils;
using System.Data;
using APSIM.Shared.Utilities;
using System.Xml.Serialization;
using Models;
using Models.PMF;
using System.Text;
using System.Collections.Generic;
using Models.Core;
using System;
using Models.Climate;

namespace Models
{
    [Serializable] 
    //[System.Xml.Serialization.XmlInclude(typeof(Model))]
    public class Script : Model
    {
        [Link] Plant Slurp;
        [Link] Clock Clock;
        [Link] Zone zone;
        [Link] Weather weather;

        
        [Description("Extinction coefficient")]
        public  double Ext_coef { get; set; }
        [Description("Maximum height of leaves")]
        public double MaximumHeight { get; set; }
        [Description("Minimum height of leaves")]
        public double MinimumHeight { get; set; }
        
        public double Cover {get; private set;}
        public double LAI { get; private set; }
                
        [EventSubscribe("StartOfSimulation")]
        private void OnStartOfSimulation(object sender, EventArgs e)
        {
            Cover = 0.5;
        }
        
        [EventSubscribe("StartOfDay")]
        private void OnStartOfDay(object sender, EventArgs e)
        {
            Cover += weather.MeanT * 0.001;

            if (Cover >= 1.0)
            {
                Cover = 0.5;        
            }

              LAI = Math.Log(1 - Cover) / -Ext_coef;

            object LAIResetValue = LAI;
            zone.Set("Slurp.Leaf.Area.FixedValue", LAIResetValue);  
            object HeightResetValue = MinimumHeight + Cover * (MaximumHeight-MinimumHeight);
            zone.Set("Slurp.Leaf.HeightFunction.FixedValue", HeightResetValue);  
        }
    }
}
```
      Manager SetupPastureRootZones
        UseExtraZone = True
```csharp
using Models.Soils;
using Models.Functions;
using APSIM.Shared.Utilities;
using System.Xml.Serialization;
using Models;
using Models.PMF;
using System.Text;
using System.Collections.Generic;
using Models.Core;
using System;
using Models.PMF.Organs;

namespace Models
{
    [Serializable] 
    public class Script : Model
    {
        [Link] private Plant Slurp;
        [Link] private Clock Clock;
        [Link] private Zone zone;
        [Link(Type = LinkType.Path, Path = "[Slurp].Root")]
        private Root root;

        [Description("Use extra root zone")]
        public bool UseExtraZone { get; set; }

        
        [EventSubscribe("StartOfSimulation")]
        private void OnSimulationCommencing(object sender, EventArgs e)
        {
            if (UseExtraZone)
            {
            root.ZoneNamesToGrowRootsIn.Add("Row");
            root.ZoneRootDepths.Add(600);
NutrientPoolFunctions InitialDM = new NutrientPoolFunctions();
Constant InitStruct = new Constant();
InitStruct.FixedValue = 10;
InitialDM.Structural = InitStruct;
Constant InitMetab = new Constant();
InitMetab.FixedValue = 0;
InitialDM.Metabolic = InitMetab;
Constant InitStor = new Constant();
InitStor.FixedValue = 0;
InitialDM.Storage = InitStor;
            root.ZoneInitialDM.Add(InitialDM);

            }
        }
    }
}
```
      Operations WinterRainfall
        2002-05-28  [Irrigation].Apply(200);
      Manager PlantVariables
```csharp
using Models.Soils;
using System;
using Models.Core;

namespace Models
{
    [Serializable]
    public class Script : Model
    {
        
    }
}
```
      Manager Reset on date: same as Replacements.Reset on date
      Soil: Latitude=39.3614; Longitude=22.093
        LayerStructure: Thickness=[200, 200, 200, 200, 200, 200, 400, 400, 400, 600]
        Physical
          Thickness  ParticleSizeSand  ParticleSizeSilt  ParticleSizeClay  Rocks     BD    AirDry  LL15  DUL   SAT
          200        20                70                10                0         1.16  0.1     0.16  0.36  0.56
          250        20                70                10                0         1.16  0.1     0.16  0.36  0.56
          300        20                70                10                0         1.16  0.15    0.16  0.36  0.56
          150        20                70                10                0.202151  1.16  0.13    0.16  0.36  0.56
          150        20                70                10                0.202151  1.16  0.1     0.16  0.36  0.56
          1950       20                70                10                0.193548  1.16  0.06    0.16  0.36  0.56
          Rocks, ParticleSizeSand, ParticleSizeSilt, ParticleSizeClay source: Calculated
          SoilCrop PearSoil: LL=[0.16, 0.16, 0.16, 0.16, 0.16, 0.16]; KL=[0.25, 0.1, 0.08, 0.05, 0.05, 0.01]; XF=[1, 1, 1, 1, 1, 1]
          SoilCrop SlurpSoil: LL=[0.16, 0.16, 0.16, 0.16, 0.16, 0.16]; KL=[0.11, 0.11, 0.02, 0, 0, 0]; XF=[1, 1, 1, 1, 1, 1]
        WaterBalance SoilWater: SummerDate=1-Nov; SummerU=4; SummerCona=1; WinterDate=1-Apr; WinterU=4; WinterCona=1; DiffusConst=88; DiffusSlope=35.4; Salb=0.18; CN2Bare=68; CNRed=20; CNCov=0.8; DischargeWidth=0; CatchmentArea=0; PSIDul=-100
          Thickness  SWCON  KLAT
          150        0.55   0
          150        0.55   0
          100        0.55   0
          200        0.55   0
          200        0.55   0
          200        0.55   0
          200        0.55   0
          200        0.55   0
          200        0.55   0
          200        0.55   0
          200        0.55   0
          200        0.55   0
          400        0.55   0
          400        0.55   0
        Organic: same as Vineyard.Row.Soil.Organic
        Chemical: Thickness=[100, 200, 300, 300, 300, 300]; PH=[7, 7, 7, 7, 7, 7]; PHUnits=Water
        CERESSoilTemperature Temperature
        Water: Thickness=[200, 250, 300, 150, 150, 1950]; InitialValues=[0.35, 0.35, 0.35, 0.33, 0.28, 0.1]; InitialPAWmm=69; RelativeTo=LL15; FilledFromTop=true
        OutputLayers: Thickness=[150, 150, 150, 150, 150, 150, 150]
        Nutrient
        Solute NO3: same as Vineyard.Row.Soil.NO3
        Solute NH4: same as Vineyard.Row.Soil.NH4
        Solute Urea: same as Vineyard.Row.Soil.Urea
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