Simulations: Version=188
  DataStore
  Simulation RussetBurbank
    Weather: FileName=Heraklion.csv; Latitude=-43.624; Tav=11.4; Amp=11.5
      ConstantsFile=/home/eathanasakis/Intership/MultiAgent_Apsimx/APSIM_FILES/Heraklion.ini
    Clock: Start=2025-03-04; End=2025-03-20
    Summary
    SoilArbitrator Soil Arbitrator
    Zone Field: Area=1; Slope=0; AspectAngle=0; Altitude=50
      Soil: SoilType=Sedementary; LocalName=Lincoln; Latitude=39.3614; Longitude=22.093
        Physical
          Thickness  ParticleSizeSand  ParticleSizeSilt  ParticleSizeClay  Rocks  BD    AirDry  LL15  DUL   SAT
          100        20                70                10                0      1.16  0.08    0.28  0.36  0.56
          200        20                70                10                0      1.16  0.16    0.28  0.36  0.56
          300        20                70                10                0.135  1.16  0.15    0.28  0.36  0.56
          300        20                70                10                0      1.16  0.13    0.28  0.36  0.56
          300        20                70                10                0.135  1.16  0.15    0.28  0.36  0.56
          300        20                70                10                0.135  1.16  0.15    0.28  0.36  0.56
          SoilCrop PotatoSoil: LL=[0.28, 0.28, 0.28, 0.28, 0.28, 0.28]; KL=[0.1, 0.06, 0.04, 0.01, 0, 0]; XF=[1, 1, 1, 1, 0, 0]
        WaterBalance SoilWater: SummerDate=1-Nov; SummerU=9; SummerCona=4.4; WinterDate=1-Apr; WinterU=9; WinterCona=4.4; DiffusConst=88; DiffusSlope=35.4; Salb=0.18; CN2Bare=0; CNRed=-9e-05; CNCov=0; DischargeWidth=0; CatchmentArea=0; PSIDul=-100
          Thickness  SWCON  KLAT
          100        0.55   0
          200        0.55   0
          300        0.55   0
          300        0.55   0
          300        0.55   0
          300        0.55   0
        Organic: FOMCNRatio=30; CarbonUnits=Total
          Thickness  Carbon  SoilCNRatio  FBiom  FInert  FOM
          100        4.53    7.44         0.025  0.3     1243.93
          200        4.53    7.44         0.025  0.4     833.832
          300        1.2     7.44         0.015  0.75    457.617
          300        1.03    7.44         0.01   0.9     251.145
          300        0.47    7.44         0.01   0.96    137.831
          300        0.47    7.44         0.01   0.96    75.6435
        Chemical: PHUnits=Water
          Thickness  PH  EC     ESP   CEC
          100        7   0.304  0.25  49.67
          200        7   0.304  0.25  49.67
          300        7   0.304  0.25  49.67
          300        7   0.304  0.25  49.67
          300        7   0.304  0.25  49.67
          300        7   0.304  0.25  49.67
        Water: Thickness=[100, 200, 300, 300, 300, 300]; InitialValues=[0.33, 0.33, 0.31, 0.27, 0.3, 0.3]; InitialPAWmm=33; RelativeTo=LL15; FilledFromTop=true
        CERESSoilTemperature Temperature
        Nutrient
        Solute NO3: Thickness=[100, 200, 300, 300, 300, 300]; InitialValues=[3.1, 2.55, 3.88889, 3.88889, 0.383333, 0.383333]; InitialValuesUnits=ppm; WaterTableConcentration=0; D0=0; DepthConstant=0; MaxDepthSoluteAccessible=0; RunoffEffectivenessAtMovingSolute=0; MaxEffectiveRunoff=0
        Solute NH4: Thickness=[100, 200, 300, 300, 300, 300]; InitialValuesUnits=ppm; WaterTableConcentration=0; D0=0; DepthConstant=0; MaxDepthSoluteAccessible=0; RunoffEffectivenessAtMovingSolute=0; MaxEffectiveRunoff=0
          InitialValues=[0.0833333, 0.0416667, 0.0277778, 0.0277778, 0.0277778, 0.0277778]
        Solute Urea: Thickness=[100, 200, 300, 300, 300, 300]; InitialValues=[0, 0, 0, 0, 0, 0]; InitialValuesUnits=kg/ha; WaterTableConcentration=0; D0=0; DepthConstant=0; MaxDepthSoluteAccessible=0; RunoffEffectivenessAtMovingSolute=0; MaxEffectiveRunoff=0
      SurfaceOrganicMatter: InitialResidueName=Wheat; InitialResidueType=Wheat; InitialResidueMass=2000; InitialStandingFraction=0; InitialCPR=0; InitialCNR=7.44
      MicroClimate: a_interception=0; b_interception=1; c_interception=0; d_interception=0; SoilHeatFluxFraction=0.4; MinimumHeightDiffForNewLayer=0; NightInterceptionFraction=0.5; ReferenceHeight=2
      Irrigation
      Fertiliser
      Plant Potato
      Operations
        2003-10-20  [Fertiliser].Apply(100, "UreaN", 0);
        2003-11-25  [Fertiliser].Apply(69, "UreaN",0);
        2003-11-26  [Irrigation].Apply(15);
        2003-12-04  [Irrigation].Apply(50);
        2003-12-16  [Irrigation].Apply(15);
        2003-12-22  [Irrigation].Apply(50);
        2003-12-30  [Irrigation].Apply(50);
        2004-01-08  [Irrigation].Apply(50);
        2004-01-21  [Irrigation].Apply(50);
        2004-01-31  [Irrigation].Apply(50);
        2004-02-27  [Irrigation].Apply(25);
      Manager PotatoPlantAndHarvest
        PlantingDate = 10/22/2003 00:00:00
        CultivarName = RussetBurbank
        PlantSpacing = 280
        RowSpacing = 770
        PlantingDepth = 120
        StemNumberPerSeedTuber = 2.2
        SetFinalLeafNumber = 40
        HarvestDate = 05/01/2004 00:00:00
```csharp
using Models.Soils;
using Models.PMF.Struct;
using System.Linq;
using System;
using Models.Core;
using Models.PMF;
using APSIM.Shared.Utilities;
using System.Xml.Serialization;
using Newtonsoft.Json;
        
namespace Models
{
    [Serializable] 
    [System.Xml.Serialization.XmlInclude(typeof(Model))]
    public class Script : Model
    {
        [Link(ByName = true)] private Plant Potato;
        [Link] private Clock Clock;
        [Link] private Zone zone;
        [Link] private Summary Summary;
        [Link(Type = LinkType.Path, Path = "[Potato].Structure")]
        private Structure structure;
        [Description("Planting Date")]
        public DateTime PlantingDate { get; set; }
        [Description("Cultivar")]
        [Display(Type=DisplayType.CultivarName, PlantName = "Potato")]
        public string CultivarName { get; set; }
        [Description("Spacing (mm) between plants on rows")]
        public double PlantSpacing { get; set; }
        [Description("Spacing (mm) between rows")]
        public double RowSpacing { get; set; }
        [Description("Depth (mm) tubers are planted")]
        public double PlantingDepth { get; set; }
        [Description("Number of stems per seed piece")]
        public double StemNumberPerSeedTuber { get; set; }
        [Description("Final leaf number.  Leave at 0 if not known")]
        public double SetFinalLeafNumber { get; set; }
        [Description("HarvestDate Date")]
        public DateTime HarvestDate { get; set; }
        [JsonIgnore] public string FinalTag { get; set; }
        [JsonIgnore] public bool Harvested { get; set; }
        [JsonIgnore] public bool ReadyForHarvest { get; set; }
        
        [EventSubscribe("DoManagement")]
        private void OnDoManagement(object sender, EventArgs e)
        {
            double PlantPopulation = 1 / ((RowSpacing / 1000) * (PlantSpacing / 1000));

            if (Clock.Today.Date == PlantingDate)
                Potato.Sow(population: PlantPopulation, cultivar: CultivarName, depth: PlantingDepth, rowSpacing: RowSpacing, budNumber: StemNumberPerSeedTuber);
            if (Clock.Today.Date == HarvestDate && Potato.IsAlive)
            {
                Potato.Harvest();
                Potato.EndCrop();
            }
            if (SetFinalLeafNumber > 0)
                zone.Set("Potato.Structure.FinalLeafNumber.FixedValue", SetFinalLeafNumber);
            if (SetFinalLeafNumber > 46)
                throw new Exception("The model will fail with leaf numbers > 46.  Reduce Final leaf number.");
        }
    }
}
```
      Manager SoilWaterUpdate
        FilePath = /home/eathanasakis/Intership/MultiAgent_Apsimx/APSIM_FILES/Wheat_soil_moisture_data.txt
```csharp
using System;
using System.Collections.Generic;
using System.IO;
using System.Linq;
using Models.Core;
using Models.Soils;
using Models.Climate;
using Models.PMF;
using Models;
using APSIM.Shared.Utilities;
using Models.Interfaces;
using System.Globalization; 
using System.Xml.Serialization;


[Serializable]
public class SoilWaterUpdate : Model
{
    [Link] private ISoilWater waterBalance;  // Ensure this links to your soil's water model
    [Link] private Clock Clock;
    [Link] private Summary Summary;

    [Description("Full path to the sensor data CSV file")]
    public string FilePath { get; set; }

    // Store updates as Date -> List of (Layer, SW) pairs
    private Dictionary<DateTime, List<(int Layer, double SW)>> dailySWData = 
        new Dictionary<DateTime, List<(int, double)>>();

    [EventSubscribe("Commencing")]
    private void OnCommencing(object sender, EventArgs e)
    {
        Summary.WriteMessage(this, "LOADING SENSOR DATA", MessageType.Diagnostic);
        if (!File.Exists(FilePath))
            throw new Exception($"File not found: {FilePath}");

        foreach (var line in File.ReadLines(FilePath).Skip(1))
        {
            if (string.IsNullOrWhiteSpace(line)) continue;

            var parts = line.Split(',');
            if (parts.Length < 3) continue;

            if (DateTime.TryParse(parts[0], out DateTime date) &&
                int.TryParse(parts[1], out int layer) &&
                double.TryParse(parts[2], NumberStyles.Any, CultureInfo.InvariantCulture, out double sw))
            {
                if (!dailySWData.ContainsKey(date))
                    dailySWData[date] = new List<(int, double)>();
                
                dailySWData[date].Add((layer, sw));
            }
        }
        Summary.WriteMessage(this, $"First 5 loaded dates: {string.Join(", ", dailySWData.Keys.OrderBy(d => d).Take(5))}", MessageType.Diagnostic);
        Summary.WriteMessage(this, "DATA",MessageType.Diagnostic);
        // Build a string that represents the content of dailySWData:
        string dailyDataText = string.Join(Environment.NewLine, 
        dailySWData.OrderBy(kvp => kvp.Key).Select(kvp => $"{kvp.Key:yyyy-MM-dd}: {string.Join("; ", kvp.Value.Select(update => $"Layer {update.Layer} -> SW {update.SW}"))}"));

        Summary.WriteMessage(this, dailyDataText, MessageType.Diagnostic);
    }

    //[EventSubscribe("DoDailyFinalisation")]  // Update at end of day
    [EventSubscribe("StartOfDay")]
    private void UpdateSoilWater(object sender, EventArgs e)
    {
        DateTime today = Clock.Today;
        if (dailySWData.TryGetValue(today, out var updates))
        {
            foreach (var (layer, sw) in updates)
            {
                if (layer >= 0 && layer < waterBalance.SWmm.Length)
                {
                    Summary.WriteMessage(this, $"BEFORE VALUE: {waterBalance.SWmm[layer]}",MessageType.Diagnostic);
                    waterBalance.SWmm[layer] = sw;  // Update current soil water
                    Summary.WriteMessage(this, 
                        $"Updated layer {layer} SW to {sw} on {today:yyyy-MM-dd}", 
                        MessageType.Diagnostic);
                }
            }
        }
    }
}
```
      Manager Automatic irrigation based on water deficit
        Crop = [Potato]
        AutoIrrigationOn = True
        FASWThreshold = 0.9
        FASWDepth = 600
        weeks = 0
        afterSowing = 2
```csharp
using Models.Interfaces;
using System;
using System.Linq;
using Models.Core;
using System.Collections.Generic;
using System.Text;
using Models.Soils;
using Models.PMF;
using Models;
using System.Xml.Serialization;
using APSIM.Shared.Utilities;
using Models.Interfaces;
namespace Models
{
    [Serializable] 
    public class Script : Model
    {
        [Link] private Zone zone;
        [Link] private Irrigation irrigation;
        [Link] private ISoilWater waterBalance;
        [Link] private IPhysical soilPhysical;
        public double FASW { get; set; }
        public double WaterDeficit  { get; set; }
    


        [Description("Crop to irrigate")]
        public IPlant Crop { get; set; }
        
        [Description("Auto irrigation on?")]
        public bool AutoIrrigationOn { get; set; }

        [Description("Threshold fraction available water (0-1)")]
        public double FASWThreshold { get; set; }

        [Description("Soil depth (mm) to which fraction available water is calculated")]
        public double FASWDepth { get; set; }

        [Description("Minimum weeks between irrigations")]
        public double weeks { get; set; }

        [Description("Minimum days after sowing for first irrigation")]
        public int afterSowing { get; set; }

        private double irrigationGap = 0;    // gap between irrigations

        /// <summary>Called at start of simulation. Performs some basic error checking. </summary>
        [EventSubscribe("StartOfSimulation")]
        private void ErrorChecking(object sender, EventArgs args)
        {
            if (Crop == null)
                throw new Exception("No crop was specified in script " + Parent.Name);
        }

        [EventSubscribe("DoManagement")]
        private void OnDoManagement(object sender, EventArgs e)
        {
            if (AutoIrrigationOn && Crop.IsAlive)
            {
                   irrigationGap += 1;                // increment gap between irrigations
                CalculateFASW();                // calc FASW and WaterDeficit
                if ((FASW < FASWThreshold) && (irrigationGap >= weeks * 7))
                {
                    irrigation.Apply(WaterDeficit, depth: 0);
                    irrigationGap = 0;            // reset
                }
            }
            else
            {
                irrigationGap = weeks * 7 - afterSowing - 1;    // allow irrigation a number of days after it becomes alive/sown
            }
        }

        // Calculate the fraction of the potential available sw
        // Calculate the deficit amount from DUL
        private void CalculateFASW()
        {
            double[] LL15 = MathUtilities.Multiply(soilPhysical.LL15, soilPhysical.Thickness);
            double[] DUL = MathUtilities.Multiply(soilPhysical.DUL, soilPhysical.Thickness);
        
            int nlayr = GetLayerIndex(FASWDepth);
            nlayr = Math.Min(nlayr, soilPhysical.Thickness.Length-1);
            double cumdep = MathUtilities.Sum(soilPhysical.Thickness, 0, nlayr, 0.0);    // tricky function that sums up to before nlayr

            double part_layer = MathUtilities.Divide((FASWDepth - cumdep), soilPhysical.Thickness[nlayr], 0.0);

            // note that results may be strange if swdep < ll15
            double avail_sw = (MathUtilities.Sum(waterBalance.SWmm, 0, nlayr, 0.0) + part_layer * waterBalance.SWmm[nlayr])
                            - (MathUtilities.Sum(LL15, 0, nlayr, 0.0) + part_layer * LL15[nlayr]);

            double pot_avail_sw = (MathUtilities.Sum(DUL, 0, nlayr, 0.0) + part_layer * DUL[nlayr])
                                - (MathUtilities.Sum(LL15, 0, nlayr, 0.0) + part_layer * LL15[nlayr]);
            
            FASW = MathUtilities.Divide(avail_sw, pot_avail_sw, 0.0);
            WaterDeficit = MathUtilities.Constrain(pot_avail_sw - avail_sw, 0.0, 100000);
        }

        // Get index of the layer that has this depth in it 
        private int GetLayerIndex(double pointDepth)
        {
            double[] cumThickness = soilPhysical.ThicknessCumulative;
            int layerIdx = 0;
            while ((layerIdx < cumThickness.Length) && (pointDepth > cumThickness[layerIdx]))
            {
                layerIdx += 1;
            }

            return layerIdx;
        }
    }
}
```
      Report: EventNames=[Clock].DoReport
        VariableNames:
          [Clock].Today
          [Soil].NO3.kgha
          [Soil].SoilWater.Drainage
          [Soil].SoilWater.Eo
          [Soil].SoilWater.Es
          [Soil].SoilWater.pond
          [Soil].SoilWater.Runoff
          [Soil].Water.MM
          [Potato].Arbitrator.DM.Allocated
          [Potato].Arbitrator.DM.TotalPlantDemand
          [Potato].Arbitrator.DM.NutrientLimitation
          [Potato].Arbitrator.DM.SinkLimitation
          [Potato].Arbitrator.DM.TotalFixationSupply
          [Potato].Arbitrator.N.TotalPlantDemand
          [Potato].Arbitrator.N.TotalPlantSupply
          [Potato].Arbitrator.N.Allocated
          [Potato].Leaf.AppearedCohortNo
          [Potato].Leaf.CohortParameters.MaximumNConc
          [Potato].Leaf.CohortParameters.MinimumNConc
          [Potato].Leaf.CoverDead
          [Potato].Leaf.CoverGreen
          [Potato].Leaf.CoverTotal
          [Potato].Leaf.Dead.N
          [Potato].Leaf.Dead.NConc
          [Potato].Leaf.Dead.Wt
          [Potato].Leaf.DeadCohortNo
          [Potato].Leaf.ExpandedCohortNo
          [Potato].Leaf.ExpandingCohortNo
          [Potato].Leaf.Fn
          [Potato].Leaf.Fw
          [Potato].Leaf.LAI
          [Potato].Leaf.LAIDead
          [Potato].Leaf.Live.N
          [Potato].Leaf.Live.NConc
          [Potato].Leaf.Live.Wt
          [Potato].Leaf.Photosynthesis.FT
          [Potato].Leaf.Photosynthesis.FVPD
          [Potato].Leaf.PlantAppearedGreenLeafNo
          [Potato].Leaf.SenescingCohortNo
          [Potato].Leaf.SpecificArea
          [Potato].Leaf.Transpiration
          [Potato].Leaf.PotentialEP
          [Potato].Phenology.CurrentPhase.Name
          [Potato].Phenology.Stage
          [Potato].Phenology.Stage
          [Potato].Root.Dead.N
          [Potato].Root.Dead.NConc
          [Potato].Root.Dead.Wt
          [Potato].Root.Depth
          [Potato].Root.Live.N
          [Potato].Root.Live.NConc
          [Potato].Root.Live.Wt
          [Potato].Root.MaximumNConc
          [Potato].Root.MinimumNConc
          [Potato].Root.NUptake
          [Potato].Root.WaterUptake
          [Potato].Stem.Dead.N
          [Potato].Stem.Dead.NConc
          [Potato].Stem.Dead.Wt
          [Potato].Stem.Live.N
          [Potato].Stem.Live.NConc
          [Potato].Stem.Live.StorageWt
          [Potato].Stem.Live.StructuralWt
          [Potato].Stem.Live.Wt
          [Potato].Stem.MaximumNConc
          [Potato].Stem.MinimumNConc
          [Potato].Structure.Height
          [Potato].Structure.LeafTipsAppeared
          [Potato].Structure.FinalLeafNumber
          [Potato].Structure.PlantTotalNodeNo
          [Potato].Structure.PrimaryBudTotalNodeNo
          [Potato].Structure.TotalStemPopn
          [Potato].AboveGround.N
          [Potato].AboveGround.Wt
          [Potato].BelowGround.N
          [Potato].BelowGround.Wt
          [Potato].Total.N
          [Potato].Total.Wt
          [Potato].TotalDead.N
          [Potato].TotalDead.Wt
          [Potato].TotalLive.N
          [Potato].TotalLive.Wt
          [Potato].Tuber.Dead.N
          [Potato].Tuber.Dead.NConc
          [Potato].Tuber.Dead.Wt
          [Potato].Tuber.LiveFWt.DryMatterContent
          [Potato].Tuber.Live.N
          [Potato].Tuber.Live.NConc
          [Potato].Tuber.Live.Wt
          [Potato].Tuber.LiveFWt
          [Potato].Tuber.MaximumNConc
          [Potato].Tuber.MinimumNConc
          [Potato].Leaf.InitialisedCohortNo
          [Irrigation].IrrigationApplied as waterApplied
          // Yield (t/ha) = [Potato].Tuber.LiveFWt (g/m²) × 0.01
          [Potato].Tuber.LiveFWt * 0.01 as yield_tonnes_per_hectare // with water content
          // Yield (t/ha) = [Potato].Tuber.Live.Wt (g/m²) × 0.01
          [Potato].Tuber.Live.Wt * 0.01 as dry_yield_tonnes_per_hectare
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