Simulations: Version=186
  Simulation
    Clock: Start=2022-01-01; End=2025-01-01
    Summary
    Weather: FileName=Tylisos.csv; Latitude=35.513828; Tav=14.9215; Amp=11.5282
      ConstantsFile=C:\Users\vagga\Desktop\test_apsim_GUI\Python_Integration\APSIM_FILES\Tylisos.ini
    SoilArbitrator
    MicroClimate: a_interception=0; b_interception=1; c_interception=0; d_interception=0; SoilHeatFluxFraction=0.4; MinimumHeightDiffForNewLayer=0; NightInterceptionFraction=0.5; ReferenceHeight=2
    Zone Field: Area=1; Slope=0; AspectAngle=0; Altitude=50
      Irrigation
      Report: EventNames=[Clock].EndOfDay
        VariableNames:
          [Clock].Today
          [Barley].Phenology.Zadok.Stage
          [Barley].Phenology.CurrentStageName
          [Barley].AboveGround.Wt
          [Barley].AboveGround.N
          [Barley].Grain.Total.Wt*10 as Yield
          [Barley].Grain.Size
          [Barley].Grain.Number
          [Barley].Grain.Total.N
          [Barley].Total.Wt
          [Field].Irrigation.IrrigationApplied as waterApplied
      Fertiliser
      Soil: ASCOrder=Vertosol; ASCSubOrder=Black; SoilType=Clay; Site=Norwin; NearestTown=Norwin; Region=Darling Downs and Granite Belt; State=Queensland; Country=Australia; NaturalVegetation=Qld. Bluegrass, possible Qld. Blue gum; ApsoilNumber=900; Latitude=-27.581836; Longitude=151.320206; LocationAccuracy=+/- 20m; YearOfSampling=0
        DataSource=CSIRO Sustainable Ecosystems, Toowoomba; Characteriesd as part of the GRDC funded project"Doing it better, doing it smarter, managing soil water in Australian agriculture' 2011
        Comments=Clay - OC, CLL for all crops estimated-based on Bongeen Mywybilla Soil No1
        Physical
          Thickness  ParticleSizeSand  ParticleSizeSilt  ParticleSizeClay  Rocks  BD       AirDry    LL15      DUL       SAT       KS
          150        5                 65                30                0      1.01056  0.13025   0.2605    0.521     0.588655  20
          150        5                 65                30                0      1.07146  0.198689  0.248362  0.496723  0.565677  20
          300        5                 65                30                0      1.09394  0.28      0.28      0.488438  0.557193  20
          300        5                 65                30                0      1.15861  0.28      0.28      0.480297  0.532787  20
          300        5                 65                30                0      1.17301  0.28      0.28      0.471584  0.527354  20
          300        5                 65                30                0      1.16287  0.28      0.28      0.457071  0.53118   20
          300        5                 65                30                0      1.1875   0.28      0.28      0.452332  0.521888  20
          Rocks, ParticleSizeSand, ParticleSizeSilt, ParticleSizeClay source: Calculated
          SoilCrop BarleySoil: LL=[0.261, 0.248, 0.28, 0.306, 0.36, 0.392, 0.446]; KL=[0.06, 0.06, 0.06, 0.04, 0.04, 0.02, 0.01]; XF=[1, 1, 1, 1, 1, 1, 1]
        WaterBalance SoilWater: SummerDate=1-Nov; SummerU=5; SummerCona=5; WinterDate=1-Apr; WinterU=5; WinterCona=5; DiffusConst=40; DiffusSlope=16; Salb=0.12; CN2Bare=73; CNRed=20; CNCov=0.8; PSIDul=-100; Thickness=[150, 150, 300, 300, 300, 300, 300]; SWCON=[0.3, 0.3, 0.3, 0.3, 0.3, 0.3, 0.3]
        Organic: FOMCNRatio=40; CarbonUnits=Total
          Thickness  Carbon  SoilCNRatio  FBiom  FInert  FOM
          150        1.2     12           0.04   0.4     347.129
          150        0.96    12           0.02   0.6     270.344
          300        0.6     12           0.02   0.8     163.972
          300        0.3     12           0.02   1       99.4541
          300        0.18    12           0.01   1       60.322
          300        0.12    12           0.01   1       36.5871
          300        0.12    12           0.01   1       22.1912
        Chemical: Thickness=[150, 150, 300, 300, 300, 300, 300]; PH=[6.74, 6.74, 6.74, 6.74, 7.777, 7]; PHUnits=Water
        Water: Thickness=[150, 150, 300, 300, 300, 300, 300]; InitialPAWmm=361.245; RelativeTo=LL15; FilledFromTop=false
          InitialValues=[0.521, 0.496723, 0.488438, 0.480297, 0.471584, 0.457071, 0.452332]
        CERESSoilTemperature Temperature
        Nutrient
        Solute NO3: Thickness=[150, 150, 300, 300, 300, 300, 300]; InitialValues=[1, 1, 1, 1, 1, 1, 1]; InitialValuesUnits=ppm; WaterTableConcentration=0; D0=0; DepthConstant=0; MaxDepthSoluteAccessible=0; RunoffEffectivenessAtMovingSolute=0; MaxEffectiveRunoff=0
        Solute NH4: Thickness=[150, 150, 300, 300, 300, 300, 300]; InitialValues=[0.1, 0.1, 0.1, 0.1, 0.1, 0.1, 0.1]; InitialValuesUnits=ppm; WaterTableConcentration=0; D0=0; DepthConstant=0; MaxDepthSoluteAccessible=0; RunoffEffectivenessAtMovingSolute=0; MaxEffectiveRunoff=0
        Solute Urea: Thickness=[150, 150, 300, 300, 300, 300, 300]; InitialValues=[0, 0, 0, 0, 0, 0, 0]; InitialValuesUnits=kg/ha; WaterTableConcentration=0; D0=0; DepthConstant=0; MaxDepthSoluteAccessible=0; RunoffEffectivenessAtMovingSolute=0; MaxEffectiveRunoff=0
      SurfaceOrganicMatter: InitialResidueName=wheat_stubble; InitialResidueType=wheat; InitialResidueMass=500; InitialStandingFraction=0; InitialCPR=0; InitialCNR=30
      Plant Barley
      Manager Sow on a fixed date
        Crop = [Barley]
        SowDate = 24-Jul
        CultivarName = Dash
        SowingDepth = 50
        RowSpacing = 750
        Population = 6
```csharp
using APSIM.Shared.Utilities;
using Models.Utilities;
using Models.Soils;
using Models.PMF;
using Models.Core;
using System;
using System.Linq;

namespace Models
{
    [Serializable]
    public class Script : Model
    {
        [Link] Clock Clock;
        [Link] Fertiliser Fertiliser;
        [Link] Summary Summary;
        [Link] Soil Soil;
        
        [Description("Crop")]
        public IPlant Crop { get; set; }

        [Description("Sowing date (d-mmm)")]
        public string SowDate { get; set; }

        [Display(Type = DisplayType.CultivarName)]
        [Description("Cultivar to be sown")]
        public string CultivarName { get; set; }

        [Description("Sowing depth (mm)")]
        public double SowingDepth { get; set; }

        [Description("Row spacing (mm)")]
        public double RowSpacing { get; set; }

        [Description("Plant population (/m2)")]
        public double Population { get; set; }

        [EventSubscribe("DoManagement")]
        private void OnDoManagement(object sender, EventArgs e)
        {
            if (DateUtilities.WithinDates(SowDate, Clock.Today, SowDate))
            {
                Crop.Sow(population: Population, cultivar: CultivarName, depth: SowingDepth, rowSpacing: RowSpacing);    
            }
        }
    }
}
```
      Manager Fertilise at sowing
        Crop = [Barley]
        FertiliserType = NO3N
        Amount = 160
```csharp
using Models.Soils;
using System;
using System.Linq;
using Models.Core;
using Models.PMF;
namespace Models
{
    [Serializable]
    public class Script : Model
    {
        [Link] Clock Clock;
        [Link] Fertiliser Fertiliser;
        
        [Description("Crop to be fertilised")]
        public IPlant Crop { get; set; }

        [Description("Type of fertiliser to apply? ")] 
        public Fertiliser.Types FertiliserType { get; set; }
    
        [Description("Amount of fertiliser to be applied (kg/ha)")]
        public double Amount { get; set; }
        
        [EventSubscribe("Sowing")]
        private void OnSowing(object sender, EventArgs e)
        {
            Model crop = sender as Model;
            if (Crop != null && crop.Name.ToLower() == (Crop as IModel).Name.ToLower())
                Fertiliser.Apply(Amount: Amount, Type: FertiliserType);
        }
    }
}
```
      Manager Harvest
        Crop = [Barley]
```csharp
using APSIM.Shared.Utilities;
using Models.Utilities;
using Models.Soils;
using Models.PMF;
using Models.Core;
using System;
using System.Linq;

namespace Models
{
    [Serializable] 
    public class Script : Model
    {
        [Description("Crop")]
        public IPlant Crop { get; set; }
        
        [EventSubscribe("DoManagement")]
        private void OnDoManagement(object sender, EventArgs e)
        {
            if (Crop.IsReadyForHarvesting)
            {
                Crop.Harvest();
                Crop.EndCrop();
            }
        }
    }
}
```
      Manager Automatic irrigation based on water deficit
        Crop = [Barley]
        AutoIrrigationOn = True
        FASWThreshold = 0.9
        FASWDepth = 600
        weeks = 3
        afterSowing = 2
```csharp
using Models.Interfaces;
using System;
using System.Linq;
using Models.Core;
using System.Collections.Generic;
using System.Text;
using Models.Soils;
using Models.PMF;
using Models;
using System.Xml.Serialization;
using APSIM.Shared.Utilities;
using Models.Interfaces;
namespace Models
{
    [Serializable] 
    public class Script : Model
    {
        [Link] private Zone zone;
        [Link] private Irrigation irrigation;
        [Link] private ISoilWater waterBalance;
        [Link] private IPhysical soilPhysical;
        public double FASW { get; set; }
        public double WaterDeficit  { get; set; }
    


        [Description("Crop to irrigate")]
        public IPlant Crop { get; set; }
        
        [Description("Auto irrigation on?")]
        public bool AutoIrrigationOn { get; set; }

        [Description("Threshold fraction available water (0-1)")]
        public double FASWThreshold { get; set; }

        [Description("Soil depth (mm) to which fraction available water is calculated")]
        public double FASWDepth { get; set; }

        [Description("Minimum weeks between irrigations")]
        public double weeks { get; set; }

        [Description("Minimum days after sowing for first irrigation")]
        public int afterSowing { get; set; }

        private double irrigationGap = 0;    // gap between irrigations

        /// <summary>Called at start of simulation. Performs some basic error checking. </summary>
        [EventSubscribe("StartOfSimulation")]
        private void ErrorChecking(object sender, EventArgs args)
        {
            if (Crop == null)
                throw new Exception("No crop was specified in script " + Parent.Name);
        }

        [EventSubscribe("DoManagement")]
        private void OnDoManagement(object sender, EventArgs e)
        {
            if (AutoIrrigationOn && Crop.IsAlive)
            {
                   irrigationGap += 1;                // increment gap between irrigations
                CalculateFASW();                // calc FASW and WaterDeficit
                if ((FASW < FASWThreshold) && (irrigationGap >= weeks * 7))
                {
                    irrigation.Apply(WaterDeficit, depth: 0);
                    irrigationGap = 0;            // reset
                }
            }
            else
            {
                irrigationGap = weeks * 7 - afterSowing - 1;    // allow irrigation a number of days after it becomes alive/sown
            }
        }

        // Calculate the fraction of the potential available sw
        // Calculate the deficit amount from DUL
        private void CalculateFASW()
        {
            double[] LL15 = MathUtilities.Multiply(soilPhysical.LL15, soilPhysical.Thickness);
            double[] DUL = MathUtilities.Multiply(soilPhysical.DUL, soilPhysical.Thickness);
        
            int nlayr = GetLayerIndex(FASWDepth);
            nlayr = Math.Min(nlayr, soilPhysical.Thickness.Length-1);
            double cumdep = MathUtilities.Sum(soilPhysical.Thickness, 0, nlayr, 0.0);    // tricky function that sums up to before nlayr

            double part_layer = MathUtilities.Divide((FASWDepth - cumdep), soilPhysical.Thickness[nlayr], 0.0);

            // note that results may be strange if swdep < ll15
            double avail_sw = (MathUtilities.Sum(waterBalance.SWmm, 0, nlayr, 0.0) + part_layer * waterBalance.SWmm[nlayr])
                            - (MathUtilities.Sum(LL15, 0, nlayr, 0.0) + part_layer * LL15[nlayr]);

            double pot_avail_sw = (MathUtilities.Sum(DUL, 0, nlayr, 0.0) + part_layer * DUL[nlayr])
                                - (MathUtilities.Sum(LL15, 0, nlayr, 0.0) + part_layer * LL15[nlayr]);
            
            FASW = MathUtilities.Divide(avail_sw, pot_avail_sw, 0.0);
            WaterDeficit = MathUtilities.Constrain(pot_avail_sw - avail_sw, 0.0, 100000);
        }

        // Get index of the layer that has this depth in it 
        private int GetLayerIndex(double pointDepth)
        {
            double[] cumThickness = soilPhysical.ThicknessCumulative;
            int layerIdx = 0;
            while ((layerIdx < cumThickness.Length) && (pointDepth > cumThickness[layerIdx]))
            {
                layerIdx += 1;
            }

            return layerIdx;
        }
    }
}
```
  DataStore
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