Simulations: Version=188
  Simulation
    Clock: Start=2024-10-10; End=2025-10-10
    Summary
    Weather: FileName=Heraklion.csv; Latitude=39.3614; Tav=3.07145; Amp=8.36051
      ConstantsFile=/home/eathanasakis/Intership/MultiAgent_Apsimx/APSIM_FILES/Heraklion.ini
    SoilArbitrator
    MicroClimate: a_interception=0; b_interception=1; c_interception=0; d_interception=0; SoilHeatFluxFraction=0.4; MinimumHeightDiffForNewLayer=0; NightInterceptionFraction=0.5; ReferenceHeight=2
    Zone Field: Area=1; Slope=0; AspectAngle=0; Altitude=50
      Report: EventNames=[Clock].DoReport
        VariableNames:
          [Clock].Today
          [Wheat].LAI
          [Wheat].Phenology.Zadok.Stage
          [Wheat].Phenology.CurrentStageName
          [Wheat].AboveGround.Wt
          [Wheat].AboveGround.N
          [Wheat].Grain.Total.Wt*10 as yield_per_square_meter
          [Wheat].Grain.Total.Wt * 0.01 as yield_tonnes_per_hectare
          [Wheat].Grain.Protein
          [Wheat].Grain.Size
          [Wheat].Grain.Number
          [Wheat].Grain.Total.Wt
          [Wheat].Grain.Total.N
          [Wheat].Total.Wt
          [Irrigation].IrrigationApplied as waterApplied
      Fertiliser
      Irrigation
      Soil: ASCOrder=Vertosol; ASCSubOrder=Black; SoilType=Clay; Site=Norwin; NearestTown=Norwin; Region=Darling Downs and Granite Belt; State=Queensland; Country=Australia; NaturalVegetation=Qld. Bluegrass, possible Qld. Blue gum; ApsoilNumber=900; Latitude=39.3614; Longitude=22.093; LocationAccuracy=+/- 20m; YearOfSampling=0
        DataSource=CSIRO Sustainable Ecosystems, Toowoomba; Characteriesd as part of the GRDC funded project"Doing it better, doing it smarter, managing soil water in Australian agriculture' 2011
        Comments=Clay - OC, CLL for all crops estimated-based on Bongeen Mywybilla Soil No1
        Physical
          Thickness  ParticleSizeSand  ParticleSizeSilt  ParticleSizeClay  Rocks  BD      AirDry    LL15  DUL       SAT       KS
          150        35                30                35                0      1.16    0.13025   0.28  0.36      0.56      20
          150        35                30                35                0      1.16    0.198689  0.28  0.36      0.56      20
          300        35                30                35                0      1.16    0.28      0.28  0.36      0.56      20
          300        35                30                35                0      1.16    0.28      0.28  0.36      0.56      20
          300        35                30                35                0      1.16    0.28      0.28  0.36      0.56      20
          300        35                30                35                0      1.16    0.28      0.28  0.36      0.56      20
          300        5                 65                30                0      1.1875  0.28      0.28  0.452332  0.521888  20
          SoilCrop WheatSoil: LL=[0.28, 0.28, 0.28, 0.28, 0.28, 0.28, 0.446]; KL=[0.06, 0.06, 0.06, 0.04, 0.04, 0.02, 0.01]; XF=[1, 1, 1, 1, 1, 1, 1]
        WaterBalance SoilWater: SummerDate=1-Nov; SummerU=5; SummerCona=5; WinterDate=1-Apr; WinterU=5; WinterCona=5; DiffusConst=40; DiffusSlope=16; Salb=0.12; CN2Bare=73; CNRed=20; CNCov=0.8; PSIDul=-100; Thickness=[150, 150, 300, 300, 300, 300, 300]; SWCON=[0.3, 0.3, 0.3, 0.3, 0.3, 0.3, 0.3]
        Organic: FOMCNRatio=40; CarbonUnits=Total
          Thickness  Carbon  SoilCNRatio  FBiom  FInert  FOM
          150        4.53    7.44         0.04   0.4     347.129
          150        4.53    7.44         0.02   0.6     270.344
          300        0.6     7.44         0.02   0.8     163.972
          300        0.3     7.44         0.02   1       99.4541
          300        0.18    7.44         0.01   1       60.322
          300        0.12    7.44         0.01   1       36.5871
          300        0.12    12           0.01   1       22.1912
        Chemical: PHUnits=Water
          Thickness  PH   EC     ESP   CEC
          150        7.5  0.304  0.25  49.67
          150        7.5  0.304  0.25  49.67
          300        7.5  0.304  0.25  49.67
          300        7.5  0.304  0.25  49.67
          300        7.5  0.304  0.25  49.67
          300        7.5  0.304  0.25  49.67
          300        8    0      0     0
        Water: Thickness=[100, 100, 100, 150, 150, 300, 300]; InitialPAWmm=230.219; RelativeTo=LL15; FilledFromTop=false
          InitialValues=[0.521, 0.496723, 0.488438, 0.480297, 0.471584, 0.457071, 0.452332]
        CERESSoilTemperature Temperature
        Nutrient
        Solute NO3: Thickness=[150, 150, 300, 300, 300, 300, 300]; InitialValues=[3.1, 2.55, 1, 1, 1, 1, 1]; InitialValuesUnits=ppm; WaterTableConcentration=0; D0=0; DepthConstant=0; MaxDepthSoluteAccessible=0; RunoffEffectivenessAtMovingSolute=0; MaxEffectiveRunoff=0
        Solute NH4: Thickness=[150, 150, 300, 300, 300, 300, 300]; InitialValues=[0.1, 0.1, 0.1, 0.1, 0.1, 0.1, 0.1]; InitialValuesUnits=ppm; WaterTableConcentration=0; D0=0; DepthConstant=0; MaxDepthSoluteAccessible=0; RunoffEffectivenessAtMovingSolute=0; MaxEffectiveRunoff=0
        Solute Urea: Thickness=[150, 150, 300, 300, 300, 300, 300]; InitialValues=[0, 0, 0, 0, 0, 0, 0]; InitialValuesUnits=kg/ha; WaterTableConcentration=0; D0=0; DepthConstant=0; MaxDepthSoluteAccessible=0; RunoffEffectivenessAtMovingSolute=0; MaxEffectiveRunoff=0
      SurfaceOrganicMatter: InitialResidueName=wheat_stubble; InitialResidueType=wheat; InitialResidueMass=500; InitialStandingFraction=0; InitialCPR=0; InitialCNR=7.44
      Plant Wheat
      Manager Sow using a variable rule
        Crop = [Wheat]
        StartDate = 1-may
        EndDate = 10-jul
        MinESW = 100
        MinRain = 25
        RainDays = 7
        CultivarName = Hartog
        SowingDepth = 30
        RowSpacing = 250
        Population = 120
```csharp
using Models.Interfaces;
using APSIM.Shared.Utilities;
using Models.Utilities;
using Models.Soils;
using Models.PMF;
using Models.Core;
using System;
using System.Linq;
using Models.Climate;

namespace Models
{
    [Serializable]
    public class Script : Model
    {
        [Link] private Clock Clock;
        [Link] private Fertiliser Fertiliser;
        [Link] private Summary Summary;
        [Link] private Soil Soil;
        private Accumulator accumulatedRain;
        [Link]
        private ISoilWater waterBalance;
        
        [Description("Crop")]
        public IPlant Crop { get; set; }

        [Description("Start of sowing window (d-mmm)")]
        public string StartDate { get; set; }

        [Description("End of sowing window (d-mmm)")]
        public string EndDate { get; set; }

        [Description("Minimum extractable soil water for sowing (mm)")]
        public double MinESW { get; set; }

        [Description("Accumulated rainfall required for sowing (mm)")]
        public double MinRain { get; set; }

        [Description("Duration of rainfall accumulation (d)")]
        public int RainDays { get; set; }

        [Display(Type = DisplayType.CultivarName)]
        [Description("Cultivar to be sown")]
        public string CultivarName { get; set; }

        [Description("Sowing depth (mm)")]
        public double SowingDepth { get; set; }

        [Description("Row spacing (mm)")]
        public double RowSpacing { get; set; }

        [Description("Plant population (/m2)")]
        public double Population { get; set; }
        
        
        [EventSubscribe("StartOfSimulation")]
        private void OnSimulationCommencing(object sender, EventArgs e)
        {
            accumulatedRain = new Accumulator(this, "[Weather].Rain", RainDays);
        }

        [EventSubscribe("DoManagement")]
        private void OnDoManagement(object sender, EventArgs e)
        {
            accumulatedRain.Update();
            
            if (DateUtilities.WithinDates(StartDate, Clock.Today, EndDate) &&
                !Crop.IsAlive &&
                MathUtilities.Sum(waterBalance.ESW) > MinESW &&
                accumulatedRain.Sum > MinRain)
            {
                Crop.Sow(population: Population, cultivar: CultivarName, depth: SowingDepth, rowSpacing: RowSpacing);    
            }
        }
    }
}
```
      Manager Fertilise at sowing
        Crop = [Wheat]
        FertiliserType = NO3N
        Amount = 160
```csharp
using Models.Soils;
using System;
using System.Linq;
using Models.Core;
using Models.PMF;
namespace Models
{
    [Serializable]
    public class Script : Model
    {
        [Link] Clock Clock;
        [Link] Fertiliser Fertiliser;
        
        [Description("Crop to be fertilised")]
        public IPlant Crop { get; set; }

        [Description("Type of fertiliser to apply? ")] 
        [Display(Type = DisplayType.FertiliserType)]public string FertiliserType { get; set; }
    
        [Description("Amount of fertiliser to be applied (kg/ha)")]
        public double Amount { get; set; }
        
        [EventSubscribe("Sowing")]
        private void OnSowing(object sender, EventArgs e)
        {
            Model crop = sender as Model;
            if (Crop != null && crop.Name.ToLower() == (Crop as IModel).Name.ToLower())
                Fertiliser.Apply(amount: Amount, type: FertiliserType);
        }
    }
}
```
      Manager Harvest
        Crop = [Wheat]
```csharp
using APSIM.Shared.Utilities;
using Models.Utilities;
using Models.Soils;
using Models.PMF;
using Models.Core;
using System;
using System.Linq;

namespace Models
{
    [Serializable] 
    public class Script : Model
    {
        [Description("Crop")]
        public IPlant Crop { get; set; }
        
        [EventSubscribe("DoManagement")]
        private void OnDoManagement(object sender, EventArgs e)
        {
            if (Crop.IsReadyForHarvesting)
            {
                Crop.Harvest();
                Crop.EndCrop();
            }
        }
    }
}
```
      Manager Automatic irrigation based on water deficit
        Crop = [Wheat]
        AutoIrrigationOn = True
        FASWThreshold = 0.9
        FASWDepth = 600
        weeks = 0
        afterSowing = 2
```csharp
using Models.Interfaces;
using System;
using System.Linq;
using Models.Core;
using System.Collections.Generic;
using System.Text;
using Models.Soils;
using Models.PMF;
using Models;
using System.Xml.Serialization;
using APSIM.Shared.Utilities;
using Models.Interfaces;
namespace Models
{
    [Serializable] 
    public class Script : Model
    {
        [Link] private Zone zone;
        [Link] private Irrigation irrigation;
        [Link] private ISoilWater waterBalance;
        [Link] private IPhysical soilPhysical;
        public double FASW { get; set; }
        public double WaterDeficit  { get; set; }
    


        [Description("Crop to irrigate")]
        public IPlant Crop { get; set; }
        
        [Description("Auto irrigation on?")]
        public bool AutoIrrigationOn { get; set; }

        [Description("Threshold fraction available water (0-1)")]
        public double FASWThreshold { get; set; }

        [Description("Soil depth (mm) to which fraction available water is calculated")]
        public double FASWDepth { get; set; }

        [Description("Minimum weeks between irrigations")]
        public double weeks { get; set; }

        [Description("Minimum days after sowing for first irrigation")]
        public int afterSowing { get; set; }

        private double irrigationGap = 0;    // gap between irrigations

        /// <summary>Called at start of simulation. Performs some basic error checking. </summary>
        [EventSubscribe("StartOfSimulation")]
        private void ErrorChecking(object sender, EventArgs args)
        {
            if (Crop == null)
                throw new Exception("No crop was specified in script " + Parent.Name);
        }

        [EventSubscribe("DoManagement")]
        private void OnDoManagement(object sender, EventArgs e)
        {
            if (AutoIrrigationOn && Crop.IsAlive)
            {
                   irrigationGap += 1;                // increment gap between irrigations
                CalculateFASW();                // calc FASW and WaterDeficit
                if ((FASW < FASWThreshold) && (irrigationGap >= weeks * 7))
                {
                    irrigation.Apply(WaterDeficit, depth: 0);
                    irrigationGap = 0;            // reset
                }
            }
            else
            {
                irrigationGap = weeks * 7 - afterSowing - 1;    // allow irrigation a number of days after it becomes alive/sown
            }
        }

        // Calculate the fraction of the potential available sw
        // Calculate the deficit amount from DUL
        private void CalculateFASW()
        {
            double[] LL15 = MathUtilities.Multiply(soilPhysical.LL15, soilPhysical.Thickness);
            double[] DUL = MathUtilities.Multiply(soilPhysical.DUL, soilPhysical.Thickness);
        
            int nlayr = GetLayerIndex(FASWDepth);
            nlayr = Math.Min(nlayr, soilPhysical.Thickness.Length-1);
            double cumdep = MathUtilities.Sum(soilPhysical.Thickness, 0, nlayr, 0.0);    // tricky function that sums up to before nlayr

            double part_layer = MathUtilities.Divide((FASWDepth - cumdep), soilPhysical.Thickness[nlayr], 0.0);

            // note that results may be strange if swdep < ll15
            double avail_sw = (MathUtilities.Sum(waterBalance.SWmm, 0, nlayr, 0.0) + part_layer * waterBalance.SWmm[nlayr])
                            - (MathUtilities.Sum(LL15, 0, nlayr, 0.0) + part_layer * LL15[nlayr]);

            double pot_avail_sw = (MathUtilities.Sum(DUL, 0, nlayr, 0.0) + part_layer * DUL[nlayr])
                                - (MathUtilities.Sum(LL15, 0, nlayr, 0.0) + part_layer * LL15[nlayr]);
            
            FASW = MathUtilities.Divide(avail_sw, pot_avail_sw, 0.0);
            WaterDeficit = MathUtilities.Constrain(pot_avail_sw - avail_sw, 0.0, 100000);
        }

        // Get index of the layer that has this depth in it 
        private int GetLayerIndex(double pointDepth)
        {
            double[] cumThickness = soilPhysical.ThicknessCumulative;
            int layerIdx = 0;
            while ((layerIdx < cumThickness.Length) && (pointDepth > cumThickness[layerIdx]))
            {
                layerIdx += 1;
            }

            return layerIdx;
        }
    }
}
```
      Manager SoilWaterUpdate
        FilePath = APSIM_FILES/Wheat_soil_moisture_data.txt
```csharp
using System;
using System.Collections.Generic;
using System.IO;
using System.Linq;
using Models.Core;
using Models.Soils;
using Models.Climate;
using Models.PMF;
using Models;
using APSIM.Shared.Utilities;
using Models.Interfaces;
using System.Globalization; 
using System.Xml.Serialization;


[Serializable]
public class SoilWaterUpdate : Model
{
    [Link] private ISoilWater waterBalance;  // Ensure this links to your soil's water model
    [Link] private Clock Clock;
    [Link] private Summary Summary;

    [Description("Full path to the sensor data CSV file")]
    public string FilePath { get; set; }

    // Store updates as Date -> List of (Layer, SW) pairs
    private Dictionary<DateTime, List<(int Layer, double SW)>> dailySWData = 
        new Dictionary<DateTime, List<(int, double)>>();

    [EventSubscribe("Commencing")]
    private void OnCommencing(object sender, EventArgs e)
    {
        Summary.WriteMessage(this, "LOADING SENSOR DATA", MessageType.Diagnostic);
        if (!File.Exists(FilePath))
            throw new Exception($"File not found: {FilePath}");

        foreach (var line in File.ReadLines(FilePath).Skip(1))
        {
            if (string.IsNullOrWhiteSpace(line)) continue;

            var parts = line.Split(',');
            if (parts.Length < 3) continue;

            if (DateTime.TryParse(parts[0], out DateTime date) &&
                int.TryParse(parts[1], out int layer) &&
                double.TryParse(parts[2], NumberStyles.Any, CultureInfo.InvariantCulture, out double sw))
            {
                if (!dailySWData.ContainsKey(date))
                    dailySWData[date] = new List<(int, double)>();
                
                dailySWData[date].Add((layer, sw));
            }
        }
        Summary.WriteMessage(this, $"First 5 loaded dates: {string.Join(", ", dailySWData.Keys.OrderBy(d => d).Take(5))}", MessageType.Diagnostic);
        Summary.WriteMessage(this, "DATA",MessageType.Diagnostic);
        // Build a string that represents the content of dailySWData:
        string dailyDataText = string.Join(Environment.NewLine, 
        dailySWData.OrderBy(kvp => kvp.Key).Select(kvp => $"{kvp.Key:yyyy-MM-dd}: {string.Join("; ", kvp.Value.Select(update => $"Layer {update.Layer} -> SW {update.SW}"))}"));

        Summary.WriteMessage(this, dailyDataText, MessageType.Diagnostic);
    }

    //[EventSubscribe("DoDailyFinalisation")]  // Update at end of day
    [EventSubscribe("StartOfDay")]
    private void UpdateSoilWater(object sender, EventArgs e)
    {
        DateTime today = Clock.Today;
        if (dailySWData.TryGetValue(today, out var updates))
        {
            foreach (var (layer, sw) in updates)
            {
                if (layer >= 0 && layer < waterBalance.SWmm.Length)
                {
                    Summary.WriteMessage(this, $"BEFORE VALUE: {waterBalance.SWmm[layer]}",MessageType.Diagnostic);
                    waterBalance.SWmm[layer] = sw;  // Update current soil water
                    Summary.WriteMessage(this, 
                        $"Updated layer {layer} SW to {sw} on {today:yyyy-MM-dd}", 
                        MessageType.Diagnostic);
                }
            }
        }
    }
}
```
  DataStore
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